# OpenSim document version 40500
Model subject_scale_walk_scaleOnly:
  gravity: 0 -9.80665 0
  length_units: meters
  force_units: N
  credits:
    Rajagopal et al. (2016), Lai et al. (2017), Uhlrich et al. (2022). Notes: P. van den Bos changed the fiber-damping from 0.01 to default of 0.1 as suggested in M. Millard (2013) "Flexing Computational Muscle: Modeling and Simulation of Musculotendon Dynamics".
  publications:
    [1] Rajagopal, A., Dembia, C.L., DeMers, M.S., Delp, D.D., Hicks, J.L., Delp, S.L. (2016) Full-body musculoskeletal model for muscle-driven simulation of human gait. IEEE Transactions on Biomedical Engineering. [2] Lai, A.K.M., Arnold, A.S., Wakeling, J.M. (2017) Why are antagonist muscles co-activated in my simulation? A musculoskeletal model for analysing human locomotor tasks. Annals of Biomedical Engineering. [3] Uhlrich, S.D., Jackson, R.W., Seth, A., Kolesar, J.A., Delp, S.L. (2022) Muscle coordination retraining inspired by musculoskeletal simulations reduces knee contact force. Scientific Reports.
  Ground
  BodySet:
    Body pelvis: mass=13.298 [kg] mass_center=(-0.08799548 0 0) inertia=(0.1603037 0.1603037 0.08150699 0 0 0)
        meshes=(r_pelvis.vtp l_pelvis.vtp sacrum.vtp)
      WrapCylinder Gmax1_at_pelvis_r: xyz_body_rotation=(-0.6 0.45 0) translation=(-0.09583666 -0.09916508 0.07303885)
          quadrant=-x radius=0.04586477 length=0.1739138
      WrapCylinder Gmax2_at_pelvis_r: xyz_body_rotation=(-0.75 0.39 0) translation=(-0.09957055 -0.0831384 0.08142036)
          quadrant=all radius=0.04646248 length=0.1131066
      WrapCylinder Gmax3_at_pelvis_r: xyz_body_rotation=(-0.1 0 0) translation=(-0.1033045 -0.08814674 0.08142036)
          quadrant=all radius=0.04496876 length=0.1195566
      WrapCylinder Gmax1_at_pelvis_l: xyz_body_rotation=(0.6 -0.45 0) translation=(-0.09583666 -0.09916508 -0.07303885)
          quadrant=-x radius=0.04586477 length=0.1739138
      WrapCylinder Gmax2_at_pelvis_l: xyz_body_rotation=(0.75 -0.39 0) translation=(-0.09957055 -0.0831384 -0.08142036)
          quadrant=all radius=0.04646248 length=0.1131066
      WrapCylinder Gmax3_at_pelvis_l: xyz_body_rotation=(0.1 0 0) translation=(-0.1033045 -0.08814674 -0.08142036)
          quadrant=all radius=0.04496876 length=0.1195566
      WrapCylinder PS_at_brim_r: xyz_body_rotation=(-0.25 -0.27 0.1) translation=(-0.09210276 -0.06010005 0.0785467)
          quadrant=-y radius=0.05640571 length=0.1190552
      WrapCylinder PS_at_brim_l: xyz_body_rotation=(0.25 0.27 0.1) translation=(-0.09210276 -0.06010005 -0.0785467)
          quadrant=-y radius=0.05640571 length=0.1190552
      WrapCylinder IL_at_brim_r: xyz_body_rotation=(-0.32 -0.24 0.9) translation=(-0.08836887 -0.06510838 0.09052028)
          quadrant=-y radius=0.0623936 length=0.1183222
      WrapCylinder IL_at_brim_l: xyz_body_rotation=(0.32 0.24 0.9) translation=(-0.08836887 -0.06510838 -0.09052028)
          quadrant=-y radius=0.0623936 length=0.1183222
    Body femur_r: mass=10.50268 mass_center=(0 -0.16286 0) inertia=(0.1387597 0.0363739 0.1463246 0 0 0)
        meshes=r_femur.vtp
      WrapCylinder GasLat_at_condyles_r: translation=(0.00479 -0.39278 0) quadrant=all radius=0.024908 length=0.0958
      WrapCylinder GasMed_at_condyles_r: translation=(0.00479 -0.39278 0) quadrant=all radius=0.02395 length=0.0958
      WrapCylinder KnExt_at_fem_r: xyz_body_rotation=(-0.0623366 0.0507601 0)
          translation=(0.003437572 -0.3858173 0.002003283) quadrant=all radius=0.02395 length=0.0958
      WrapCylinder KnExtVL_at_fem_r: xyz_body_rotation=(-0.0623366 0.0507601 0)
          translation=(0.001808972 -0.3858173 0.002003283) quadrant=all radius=0.02395 length=0.0958
      WrapCylinder AB_at_femshaft_r: xyz_body_rotation=(1.66157 0.186644 0)
          translation=(0.01402838 -0.107866 0.02238367) quadrant=all radius=0.015807 length=0.06706
      WrapCylinder AL_at_femshaft_r: xyz_body_rotation=(1.77711 0.136489 0)
          translation=(0.02944193 -0.2221688 0.01447892) quadrant=all radius=0.0192558 length=0.0958
      WrapCylinder AMprox_at_femshaft_r: xyz_body_rotation=(1.61126 0.18656 0)
          translation=(0.004965304 -0.06983322 0.02433607) quadrant=all radius=0.0202138 length=0.06706
      WrapCylinder AMmid_at_femshaft_r: xyz_body_rotation=(1.61139 0.13656 0)
          translation=(0.02204598 -0.1539611 0.01971966) quadrant=all radius=0.0205012 length=0.11496
      WrapCylinder AMdist_at_femshaft_r: xyz_body_rotation=(1.71188 0.186636 0)
          translation=(0.03027903 -0.2497851 0.008971287) quadrant=all radius=0.0208844 length=0.1916
      WrapCylinder AMisch_at_condyles_r: xyz_body_rotation=(1.71115 -0.463363 0)
          translation=(-0.02169975 -0.3610041 -0.003021886) quadrant=all radius=0.03832 length=0.22992
      WrapCylinder PECT_at_femshaft_r: xyz_body_rotation=(1.81295 0.276344 0)
          translation=(0.005830129 -0.08095378 0.029162) quadrant=all radius=0.01437 length=0.0479
    Body tibia_prox_r: mass=0 mass_center=(0 0 0) inertia=(0 0 0 0 0 0) meshes=(r_tibia.vtp r_fibula.vtp)
      WrapCylinder GasLat_at_shank_r: xyz_body_rotation=(2.96723 -0.279725 -1.47812)
          translation=(-0.0074 -0.074 -0.0033) quadrant=-y radius=0.055 length=0.1
      WrapCylinder GasMed_at_shank_r: xyz_body_rotation=(2.96723 0.0279725 -1.47812)
          translation=(-0.0074 -0.074 -0.0033) quadrant=-y radius=0.055 length=0.1
      WrapCylinder GR_at_condyles_r: xyz_body_rotation=(0 -0.4 0) translation=(-0.003 -0.02 0) quadrant=all
          radius=0.036 length=0.1
      WrapCylinder SM_at_condyles_r: xyz_body_rotation=(0 -0.1 0) translation=(-0.001 -0.02 0) quadrant=all
          radius=0.0352 length=0.1
      WrapCylinder ST_at_condyles_r: xyz_body_rotation=(0 -0.2 0) translation=(-0.002 -0.0205 0) quadrant=all
          radius=0.0425 length=0.1
      WrapCylinder BF_at_gastroc_r: translation=(-0.058 -0.06 0) quadrant=y radius=0.03 length=0.15
    Body med_cond_r: mass=0 mass_center=(0 0 0) inertia=(0 0 0 0 0 0) meshes=sphere.vtp
    Body lat_cond_r: mass=0 mass_center=(0 0 0) inertia=(0 0 0 0 0 0) meshes=sphere.vtp
    Body tibial_plat_r: mass=0 mass_center=(0 0 0) inertia=(0 0 0 0 0 0)
      PhysicalOffsetFrame tibial_plat_r_geom_frame_1: socket_parent=.. translation=(0 -0.045 0) [meters]
          orientation=(3.14159 0.00159265 3.14159) [radians]
    Body tibia_r: mass=4.186325 mass_center=(0 -0.2145183 0) inertia=(0.07513155 0.007602598 0.07617505 0 0 0)
        meshes=(r_tibia.vtp r_fibula.vtp)
      WrapCylinder GasLat_at_shank_r: xyz_body_rotation=(2.96723 -0.279725 -1.47812)
          translation=(-0.0085026 -0.085026 -0.0037917) quadrant=-y radius=0.063195 length=0.1149
      WrapCylinder GasMed_at_shank_r: xyz_body_rotation=(2.96723 0.0279725 -1.47812)
          translation=(-0.0085026 -0.085026 -0.0037917) quadrant=-y radius=0.067791 length=0.1149
      WrapCylinder GR_at_condyles_r: xyz_body_rotation=(0 -0.4 0) translation=(-0.003447 -0.02298 0) quadrant=all
          radius=0.041364 length=0.1149
      WrapCylinder SM_at_condyles_r: xyz_body_rotation=(0 -0.1 0) translation=(-0.001149 -0.02298 0) quadrant=all
          radius=0.0396405 length=0.1149
      WrapCylinder ST_at_condyles_r: xyz_body_rotation=(0 -0.2 0) translation=(-0.002298 -0.0235545 0) quadrant=all
          radius=0.0488325 length=0.1149
      WrapCylinder BF_at_gastroc_r: translation=(-0.044811 -0.06894 0) quadrant=y radius=0.033321 length=0.17235
    Body patella_r: mass=0.09733276 mass_center=(0.0017244 0.0252912 0)
        inertia=(2.974162e-6 1.358581e-5 1.358581e-5 0 0 0) meshes=r_patella.vtp
    Body talus_r: mass=0.112915 mass_center=(0 0 0) inertia=(0.002808237 0.002141908 0.002141908 0 0 0)
        meshes=r_talus.vtp
    Body calcn_r: mass=1.411438 mass_center=(0.1143155 0.04982283 0)
        inertia=(0.003931532 0.006687618 0.006687618 0 0 0) meshes=r_foot.vtp
    Body toes_r: mass=0.244574 mass_center=(0.03955318 0.009964565 -0.02620674)
        inertia=(0.0002808237 0.0003617487 0.0003617487 0 0 0) meshes=r_bofoot.vtp
    Body femur_l: mass=10.50268 mass_center=(0 -0.16286 0) inertia=(0.1387597 0.0363739 0.1463246 0 0 0)
        meshes=l_femur.vtp
      WrapCylinder GasLat_at_condyles_l: translation=(0.00479 -0.39278 0) quadrant=all radius=0.024908 length=0.0958
      WrapCylinder GasMed_at_condyles_l: translation=(0.00479 -0.39278 0) quadrant=all radius=0.02395 length=0.0958
      WrapCylinder KnExt_at_fem_l: xyz_body_rotation=(0.0623366 -0.0507601 0)
          translation=(0.003437572 -0.3858173 -0.002003283) quadrant=all radius=0.02395 length=0.0958
      WrapCylinder KnExtVL_at_fem_l: xyz_body_rotation=(0.0623366 -0.0507601 0)
          translation=(0.001808972 -0.3858173 -0.002003283) quadrant=all radius=0.02395 length=0.0958
      WrapCylinder AB_at_femshaft_l: xyz_body_rotation=(-1.66157 -0.186644 0)
          translation=(0.01402838 -0.107866 -0.02238367) quadrant=all radius=0.015807 length=0.06706
      WrapCylinder AL_at_femshaft_l: xyz_body_rotation=(-1.77711 -0.136489 0)
          translation=(0.02944193 -0.2221688 -0.01447892) quadrant=all radius=0.0192558 length=0.0958
      WrapCylinder AMprox_at_femshaft_l: xyz_body_rotation=(-1.61126 -0.18656 0)
          translation=(0.004965304 -0.06983322 -0.02433607) quadrant=all radius=0.0202138 length=0.06706
      WrapCylinder AMmid_at_femshaft_l: xyz_body_rotation=(-1.61139 -0.13656 0)
          translation=(0.02204598 -0.1539611 -0.01971966) quadrant=all radius=0.0205012 length=0.11496
      WrapCylinder AMdist_at_femshaft_l: xyz_body_rotation=(-1.71188 -0.186636 0)
          translation=(0.03027903 -0.2497851 -0.008971287) quadrant=all radius=0.0208844 length=0.1916
      WrapCylinder AMisch_at_condyles_l: xyz_body_rotation=(-1.71115 0.463363 0)
          translation=(-0.02169975 -0.3610041 0.003021886) quadrant=all radius=0.03832 length=0.22992
      WrapCylinder PECT_at_femshaft_l: xyz_body_rotation=(-1.81295 -0.276344 0)
          translation=(0.005830129 -0.08095378 -0.029162) quadrant=all radius=0.01437 length=0.0479
    Body tibia_prox_l: mass=0 mass_center=(0 0 0) inertia=(0 0 0 0 0 0) meshes=(l_tibia.vtp l_fibula.vtp)
      WrapCylinder GasLat_at_shank_l: xyz_body_rotation=(-2.96723 0.279725 -1.47812)
          translation=(-0.0074 -0.074 0.0033) quadrant=-y radius=0.055 length=0.1
      WrapCylinder GasMed_at_shank_l: xyz_body_rotation=(-2.96723 -0.0279725 -1.47812)
          translation=(-0.0074 -0.074 0.0033) quadrant=-y radius=0.055 length=0.1
      WrapCylinder GR_at_condyles_l: xyz_body_rotation=(0 0.4 0) translation=(-0.003 -0.02 0) quadrant=all radius=0.036
          length=0.1
      WrapCylinder SM_at_condyles_l: xyz_body_rotation=(0 0.1 0) translation=(-0.001 -0.02 0) quadrant=all
          radius=0.0352 length=0.1
      WrapCylinder ST_at_condyles_l: xyz_body_rotation=(0 0.2 0) translation=(-0.002 -0.0205 0) quadrant=all
          radius=0.0425 length=0.1
      WrapCylinder BF_at_gastroc_l: translation=(-0.058 -0.06 0) quadrant=all radius=0.03 length=0.15
    Body med_cond_l: mass=0 mass_center=(0 0 0) inertia=(0 0 0 0 0 0) meshes=sphere.vtp
    Body lat_cond_l: mass=0 mass_center=(0 0 0) inertia=(0 0 0 0 0 0) meshes=sphere.vtp
    Body tibial_plat_l: mass=0 mass_center=(0 0 0) inertia=(0 0 0 0 0 0)
      PhysicalOffsetFrame tibial_plat_l_geom_frame_1: socket_parent=.. translation=(0 -0.045 0)
          orientation=(3.14159 0.00159265 3.14159)
    Body tibia_l: mass=4.186325 mass_center=(0 -0.2145183 0) inertia=(0.07513155 0.007602598 0.07617505 0 0 0)
        meshes=(l_tibia.vtp l_fibula.vtp)
      WrapCylinder GasLat_at_shank_l: xyz_body_rotation=(-2.96723 0.279725 -1.47812)
          translation=(-0.0085026 -0.085026 0.0037917) quadrant=-y radius=0.063195 length=0.1149
      WrapCylinder GasMed_at_shank_l: xyz_body_rotation=(-2.96723 -0.0279725 -1.47812)
          translation=(-0.0085026 -0.085026 0.0037917) quadrant=-y radius=0.067791 length=0.1149
      WrapCylinder GR_at_condyles_l: xyz_body_rotation=(0 0.4 0) translation=(-0.003447 -0.02298 0) quadrant=all
          radius=0.041364 length=0.1149
      WrapCylinder SM_at_condyles_l: xyz_body_rotation=(0 0.1 0) translation=(-0.001149 -0.02298 0) quadrant=all
          radius=0.0396405 length=0.1149
      WrapCylinder ST_at_condyles_l: xyz_body_rotation=(0 0.2 0) translation=(-0.002298 -0.0235545 0) quadrant=all
          radius=0.0488325 length=0.1149
      WrapCylinder BF_at_gastroc_l: translation=(-0.044811 -0.06894 0) quadrant=all radius=0.033321 length=0.17235
    Body patella_l: mass=0.09733276 mass_center=(0.0017244 0.0252912 0)
        inertia=(2.974162e-6 1.358581e-5 1.358581e-5 0 0 0) meshes=l_patella.vtp
    Body talus_l: mass=0.112915 mass_center=(0 0 0) inertia=(0.002808237 0.002141908 0.002141908 0 0 0)
        meshes=l_talus.vtp
    Body calcn_l: mass=1.411438 mass_center=(0.1143155 0.04982283 0)
        inertia=(0.003931532 0.006687618 0.006687618 0 0 0) meshes=l_foot.vtp
    Body toes_l: mass=0.244574 mass_center=(0.03955318 0.009964565 0.02620674)
        inertia=(0.0002808237 0.0003617487 0.0003617487 0 0 0) meshes=l_bofoot.vtp
    Body torso: mass=30.29126 mass_center=(-0.0363039 0.3768992 0) inertia=(2.342574 1.249253 2.342574 0 0 0)
        meshes=(hat_spine.vtp hat_jaw.vtp hat_skull.vtp hat_ribs_scap.vtp)
    Body humerus_r: mass=2.294998 mass_center=(0 -0.1806512 0) inertia=(0.01626722 0.005611688 0.01825943 0 0 0)
        meshes=humerus_rv.vtp
    Body ulna_r: mass=0.6859588 mass_center=(0 -0.1222087 0) inertia=(0.003438643 0.0007174481 0.003730033 0 0 0)
        meshes=ulna_rv.vtp
    Body radius_r: mass=0.6859588 mass_center=(0 -0.1222087 0) inertia=(0.003438643 0.0007174481 0.003730033 0 0 0)
        meshes=radius_rv.vtp
    Body hand_r: mass=0.5165863 mass_center=(0 -0.068095 0) inertia=(0.001007202 0.0006176452 0.001513061 0 0 0)
        meshes=(pisiform_rvs.vtp lunate_rvs.vtp scaphoid_rvs.vtp triquetrum_rvs.vtp hamate_rvs.vtp capitate_rvs.vtp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)
    Body humerus_l: mass=2.294998 mass_center=(0 -0.1806512 0) inertia=(0.01626722 0.005611688 0.01825943 0 0 0)
        meshes=humerus_lv.vtp
    Body ulna_l: mass=0.6859588 mass_center=(0 -0.1222087 0) inertia=(0.003438643 0.0007174481 0.003730033 0 0 0)
        meshes=ulna_lv.vtp
    Body radius_l: mass=0.6859588 mass_center=(0 -0.1222087 0) inertia=(0.003438643 0.0007174481 0.003730033 0 0 0)
        meshes=radius_lv.vtp
    Body hand_l: mass=0.5165863 mass_center=(0 -0.068095 0) inertia=(0.001007202 0.0006176452 0.001513061 0 0 0)
        meshes=(pisiform_lvs.vtp lunate_lvs.vtp scaphoid_lvs.vtp triquetrum_lvs.vtp hamate_lvs.vtp capitate_lvs.vtp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)
  JointSet:
    CustomJoint ground_pelvis: socket_parent_frame=ground_offset socket_child_frame=pelvis_offset
      Coordinate pelvis_tilt: default_value=0 range=(-1.570796 1.570796) clamped=true
      Coordinate pelvis_list: default_value=0 range=(-1.570796 1.570796) clamped=true
      Coordinate pelvis_rotation: default_value=0 range=(-1.570796 1.570796) clamped=true
      Coordinate pelvis_tx: default_value=0 range=(-5 5) clamped=true
      Coordinate pelvis_ty: default_value=0.94 range=(-1 2) clamped=true
      Coordinate pelvis_tz: default_value=0 range=(-3 3) clamped=true
      PhysicalOffsetFrame ground_offset: socket_parent=/ground translation=(0 0 0)
      PhysicalOffsetFrame pelvis_offset: socket_parent=/bodyset/pelvis translation=(0 0 0)
      SpatialTransform:
        TransformAxis rotation1: coordinates=pelvis_tilt axis=(0 0 1) LinearFunction(coefficients=1 0)
        TransformAxis rotation2: coordinates=pelvis_list axis=(1 0 0) LinearFunction(coefficients=1 0)
        TransformAxis rotation3: coordinates=pelvis_rotation axis=(0 1 0) LinearFunction(coefficients=1 0)
        TransformAxis translation1: coordinates=pelvis_tx axis=(1 0 0) LinearFunction(coefficients=1 0)
        TransformAxis translation2: coordinates=pelvis_ty axis=(0 1 0) LinearFunction(coefficients=1 0)
        TransformAxis translation3: coordinates=pelvis_tz axis=(0 0 1) LinearFunction(coefficients=1 0)
    CustomJoint hip_r: socket_parent_frame=pelvis_offset socket_child_frame=femur_r_offset
      Coordinate hip_flexion_r: default_value=0 range=(-0.5235988 2.094395) clamped=true
      Coordinate hip_adduction_r: default_value=0 range=(-0.8726646 0.5235988) clamped=true
      Coordinate hip_rotation_r: default_value=0 range=(-0.6981317 0.6981317) clamped=true
      PhysicalOffsetFrame pelvis_offset: socket_parent=/bodyset/pelvis translation=(-0.07004291 -0.07862088 0.09250789)
      PhysicalOffsetFrame femur_r_offset: socket_parent=/bodyset/femur_r translation=(0 0 0)
      SpatialTransform: axes_held_at_zero=(translation1 translation2 translation3)
        TransformAxis rotation1: coordinates=hip_flexion_r axis=(0 0 1) LinearFunction(coefficients=1 0)
        TransformAxis rotation2: coordinates=hip_adduction_r axis=(1 0 0) LinearFunction(coefficients=1 0)
        TransformAxis rotation3: coordinates=hip_rotation_r axis=(0 1 0) LinearFunction(coefficients=1 0)
    CustomJoint knee_r: socket_parent_frame=femur_r_offset socket_child_frame=tibia_prox_r_offset
      Coordinate knee_angle_r: default_value=0 range=(0 2.443461) clamped=true
      PhysicalOffsetFrame femur_r_offset: socket_parent=/bodyset/femur_r translation=(-0.004311 -0.3923968 -0.0016765)
          orientation=(-1.64157 1.44618 1.5708)
      PhysicalOffsetFrame tibia_prox_r_offset: socket_parent=/bodyset/tibia_prox_r
          translation=(-0.00808954 -0.0035348 -0.00148474) orientation=(-1.64157 1.44618 1.5708)
      SpatialTransform:
        TransformAxis rotation1: coordinates=knee_angle_r axis=(1 0 0) LinearFunction(coefficients=1 0)
        TransformAxis rotation2: coordinates=knee_angle_r axis=(0 0 1)
          PolynomialFunction: coefficients=(0.01083209 -0.02521833 -0.03284781 0.07910001 -1.473252e-8)
        TransformAxis rotation3: coordinates=knee_angle_r axis=(0 1 0)
          PolynomialFunction: coefficients=(0.02516576 -0.1694801 0.3694993 -4.430358e-8)
        TransformAxis translation1: coordinates=knee_angle_r axis=(1 0 0)
          MultiplierFunction: scale=0.958
            PolynomialFunction: coefficients=(0.0001590448 -0.00101515 0.001817511 2.641427e-5 -7.746564e-7)
        TransformAxis translation2: coordinates=knee_angle_r axis=(0 1 0)
          MultiplierFunction: scale=0.958
            PolynomialFunction: coefficients=(-0.0005796878 0.005079766 -0.01144238 0.003936909 -2.51635e-5)
        TransformAxis translation3: coordinates=knee_angle_r axis=(0 0 1)
          MultiplierFunction: scale=0.958
            PolynomialFunction: coefficients=(0.001208087 -0.004453611 0.0006116494 0.00626543 -1.461913e-5)
    CustomJoint med_cond_joint_r: socket_parent_frame=tibia_prox_r_offset socket_child_frame=med_cond_r_offset
      Coordinate med_cond_adduction_r: default_value=0 range=(-2.094395 2.094395) clamped=true
          is_free_to_satisfy_constraints=true
      PhysicalOffsetFrame tibia_prox_r_offset: socket_parent=/bodyset/tibia_prox_r translation=(0 -0.035 -0.02)
      PhysicalOffsetFrame med_cond_r_offset: socket_parent=/bodyset/med_cond_r translation=(0 0 0)
      SpatialTransform: axes_held_at_zero=(rotation2 rotation3 translation1 translation2 translation3)
        TransformAxis rotation1: coordinates=med_cond_adduction_r axis=(1 0 0) LinearFunction(coefficients=1 0)
    CustomJoint lat_cond_joint_r: socket_parent_frame=tibia_prox_r_offset socket_child_frame=lat_cond_r_offset
      Coordinate lat_cond_adduction_r: default_value=0 range=(-2.094395 2.094395) clamped=true
          is_free_to_satisfy_constraints=true
      PhysicalOffsetFrame tibia_prox_r_offset: socket_parent=/bodyset/tibia_prox_r translation=(0 -0.035 0.02)
      PhysicalOffsetFrame lat_cond_r_offset: socket_parent=/bodyset/lat_cond_r translation=(0 0 0)
      SpatialTransform: axes_held_at_zero=(rotation2 rotation3 translation1 translation2 translation3)
        TransformAxis rotation1: coordinates=lat_cond_adduction_r axis=(1 0 0) LinearFunction(coefficients=1 0)
    WeldJoint med_cond_weld_r: socket_parent_frame=med_cond_r_offset socket_child_frame=tibial_plat_r_offset
      PhysicalOffsetFrame med_cond_r_offset: socket_parent=/bodyset/med_cond_r translation=(0 0.035 0.02)
      PhysicalOffsetFrame tibial_plat_r_offset: socket_parent=/bodyset/tibial_plat_r translation=(0 0 0)
    WeldJoint tibial_plat_weld_r: socket_parent_frame=tibial_plat_r_offset socket_child_frame=tibia_r_offset
      PhysicalOffsetFrame tibial_plat_r_offset: socket_parent=/bodyset/tibial_plat_r translation=(0 0 0)
      PhysicalOffsetFrame tibia_r_offset: socket_parent=/bodyset/tibia_r translation=(0 0 0)
    CustomJoint patellofemoral_r: socket_parent_frame=femur_r_offset socket_child_frame=patella_r_offset
      Coordinate knee_angle_r_beta: default_value=0 range=(-99999.9 99999.9) clamped=false
      PhysicalOffsetFrame femur_r_offset: socket_parent=/bodyset/femur_r
          translation=(-0.00775022 -0.3908257 -0.0026345)
      PhysicalOffsetFrame patella_r_offset: socket_parent=/bodyset/patella_r translation=(0 0 0)
      SpatialTransform: axes_held_at_zero=(rotation2 rotation3)
        TransformAxis rotation1: coordinates=knee_angle_r_beta axis=(0 0 1)
          SimmSpline: x=(0 0.174533 0.349066 0.523599 0.698132 0.872665 1.0472 1.22173 1.39626 1.5708 1.74533 1.91986 2.0944)
              y=(0.00113686 -0.00629212 -0.105582 -0.253683 -0.414245 -0.579047 -0.747244 -0.91799 -1.09044 -1.26379 -1.43763 -1.61186 -1.78634)
        TransformAxis translation1: coordinates=knee_angle_r_beta axis=(1 0 0)
          MultiplierFunction: scale=0.958
            SimmSpline: x=(0 0.174533 0.349066 0.523599 0.698132 0.872665 1.0472 1.22173 1.39626 1.5708 1.74533 1.91986 2.0944)
                y=(0.0524 0.0488 0.0437 0.0371 0.0296 0.0216 0.0136 0.0057 -0.0019 -0.0088 -0.0148 -0.0196 -0.0227)
        TransformAxis translation2: coordinates=knee_angle_r_beta axis=(0 1 0)
          MultiplierFunction: scale=0.958
            SimmSpline: x=(0 0.174533 0.349066 0.523599 0.698132 0.872665 1.0472 1.22173 1.39626 1.5708 1.74533 1.91986 2.0944)
                y=(-0.0108 -0.019 -0.0263 -0.0322 -0.0367 -0.0395 -0.0408 -0.0404 -0.0384 -0.0349 -0.0301 -0.0245 -0.0187)
        TransformAxis translation3: axis=(0 0 1) MultiplierFunction(scale=0.958, Constant(value=0.00275))
    PinJoint ankle_r: socket_parent_frame=tibia_prox_r_offset socket_child_frame=talus_r_offset
      Coordinate ankle_angle_r: default_value=0 range=(-0.8726646 0.8726646) clamped=true
      PhysicalOffsetFrame tibia_prox_r_offset: socket_parent=/bodyset/tibia_r translation=(-0.01149 -0.4596 0)
          orientation=(0.175895 -0.105208 0.0186622)
      PhysicalOffsetFrame talus_r_offset: socket_parent=/bodyset/talus_r translation=(0 0 0)
          orientation=(0.175895 -0.105208 0.0186622)
    PinJoint subtalar_r: socket_parent_frame=talus_r_offset socket_child_frame=calcn_r_offset
      Coordinate subtalar_angle_r: default_value=0 range=(-0.6108652 0.6108652) clamped=true locked=true
      PhysicalOffsetFrame talus_r_offset: socket_parent=/bodyset/talus_r
          translation=(-0.05575169 -0.06966892 0.01186042) orientation=(-1.76819 0.906223 1.8196)
      PhysicalOffsetFrame calcn_r_offset: socket_parent=/bodyset/calcn_r translation=(0 0 0)
          orientation=(-1.76819 0.906223 1.8196)
    PinJoint mtp_r: socket_parent_frame=calcn_r_offset socket_child_frame=toes_r_offset
      Coordinate mtp_angle_r: default_value=0 range=(-0.7853982 0.5235988) clamped=true locked=true
      PhysicalOffsetFrame calcn_r_offset: socket_parent=/bodyset/calcn_r
          translation=(0.2043962 -0.003321522 0.00161733) orientation=(-3.14159 0.619901 0)
      PhysicalOffsetFrame toes_r_offset: socket_parent=/bodyset/toes_r translation=(0 0 0)
          orientation=(-3.14159 0.619901 0)
    CustomJoint hip_l: socket_parent_frame=pelvis_offset socket_child_frame=femur_l_offset
      Coordinate hip_flexion_l: default_value=0 range=(-0.5235988 2.094395) clamped=true
      Coordinate hip_adduction_l: default_value=0 range=(-0.8726646 0.5235988) clamped=true
      Coordinate hip_rotation_l: default_value=0 range=(-0.6981317 0.6981317) clamped=true
      PhysicalOffsetFrame pelvis_offset: socket_parent=/bodyset/pelvis
          translation=(-0.07004291 -0.07862088 -0.09250789)
      PhysicalOffsetFrame femur_l_offset: socket_parent=/bodyset/femur_l translation=(0 0 0)
      SpatialTransform: axes_held_at_zero=(translation1 translation2 translation3)
        TransformAxis rotation1: coordinates=hip_flexion_l axis=(0 0 1) LinearFunction(coefficients=1 0)
        TransformAxis rotation2: coordinates=hip_adduction_l axis=(1 0 0) LinearFunction(coefficients=-1 0)
        TransformAxis rotation3: coordinates=hip_rotation_l axis=(0 1 0) LinearFunction(coefficients=-1 0)
    CustomJoint knee_l: socket_parent_frame=femur_l_offset socket_child_frame=tibia_prox_l_offset
      Coordinate knee_angle_l: default_value=0 range=(0 2.443461) clamped=true
      PhysicalOffsetFrame femur_l_offset: socket_parent=/bodyset/femur_l translation=(-0.004311 -0.3923968 0.0016765)
          orientation=(1.64157 -1.44618 1.5708)
      PhysicalOffsetFrame tibia_prox_l_offset: socket_parent=/bodyset/tibia_prox_l
          translation=(-0.00808954 -0.0035348 0.00148474) orientation=(1.64157 -1.44618 1.5708)
      SpatialTransform:
        TransformAxis rotation1: coordinates=knee_angle_l axis=(-1 0 0) LinearFunction(coefficients=1 0)
        TransformAxis rotation2: coordinates=knee_angle_l axis=(0 0 1)
          PolynomialFunction: coefficients=(0.01083209 -0.02521833 -0.03284781 0.07910001 -1.473252e-8)
        TransformAxis rotation3: coordinates=knee_angle_l axis=(0 1 0)
          PolynomialFunction: coefficients=(-0.02516576 0.1694801 -0.3694993 4.430358e-8)
        TransformAxis translation1: coordinates=knee_angle_l axis=(1 0 0)
          MultiplierFunction: scale=0.958
            PolynomialFunction: coefficients=(0.0001590448 -0.00101515 0.001817511 2.641427e-5 -7.746564e-7)
        TransformAxis translation2: coordinates=knee_angle_l axis=(0 1 0)
          MultiplierFunction: scale=0.958
            PolynomialFunction: coefficients=(-0.0005796878 0.005079766 -0.01144238 0.003936909 -2.51635e-5)
        TransformAxis translation3: coordinates=knee_angle_l axis=(0 0 1)
          MultiplierFunction: scale=0.958
            PolynomialFunction: coefficients=(-0.001208087 0.004453611 -0.0006116494 -0.00626543 1.461913e-5)
    CustomJoint med_cond_joint_l: socket_parent_frame=tibia_prox_l_offset socket_child_frame=med_cond_l_offset
      Coordinate med_cond_adduction_l: default_value=0 range=(-2.094395 2.094395) clamped=true
          is_free_to_satisfy_constraints=true
      PhysicalOffsetFrame tibia_prox_l_offset: socket_parent=/bodyset/tibia_prox_l translation=(0 -0.035 0.02)
      PhysicalOffsetFrame med_cond_l_offset: socket_parent=/bodyset/med_cond_l translation=(0 0 0)
      SpatialTransform: axes_held_at_zero=(rotation2 rotation3 translation1 translation2 translation3)
        TransformAxis rotation1: coordinates=med_cond_adduction_l axis=(1 0 0) LinearFunction(coefficients=1 0)
    CustomJoint lat_cond_joint_l: socket_parent_frame=tibia_prox_l_offset socket_child_frame=lat_cond_l_offset
      Coordinate lat_cond_adduction_l: default_value=0 range=(-2.094395 2.094395) clamped=true
          is_free_to_satisfy_constraints=true
      PhysicalOffsetFrame tibia_prox_l_offset: socket_parent=/bodyset/tibia_prox_l translation=(0 -0.035 -0.02)
      PhysicalOffsetFrame lat_cond_l_offset: socket_parent=/bodyset/lat_cond_l translation=(0 0 0)
      SpatialTransform: axes_held_at_zero=(rotation2 rotation3 translation1 translation2 translation3)
        TransformAxis rotation1: coordinates=lat_cond_adduction_l axis=(1 0 0) LinearFunction(coefficients=1 0)
    WeldJoint med_cond_weld_l: socket_parent_frame=med_cond_l_offset socket_child_frame=tibial_plat_l_offset
      PhysicalOffsetFrame med_cond_l_offset: socket_parent=/bodyset/med_cond_l translation=(0 0.035 -0.02)
      PhysicalOffsetFrame tibial_plat_l_offset: socket_parent=/bodyset/tibial_plat_l translation=(0 0 0)
    WeldJoint tibial_plat_weld_l: socket_parent_frame=tibial_plat_l_offset socket_child_frame=tibia_l_offset
      PhysicalOffsetFrame tibial_plat_l_offset: socket_parent=/bodyset/tibial_plat_l translation=(0 0 0)
      PhysicalOffsetFrame tibia_l_offset: socket_parent=/bodyset/tibia_l translation=(0 0 0)
    CustomJoint patellofemoral_l: socket_parent_frame=femur_l_offset socket_child_frame=patella_l_offset
      Coordinate knee_angle_l_beta: default_value=0 range=(-99999.9 99999.9) clamped=false
      PhysicalOffsetFrame femur_l_offset: socket_parent=/bodyset/femur_l translation=(-0.00775022 -0.3908257 0.0026345)
      PhysicalOffsetFrame patella_l_offset: socket_parent=/bodyset/patella_l translation=(0 0 0)
      SpatialTransform: axes_held_at_zero=(rotation2 rotation3)
        TransformAxis rotation1: coordinates=knee_angle_l_beta axis=(0 0 1)
          SimmSpline: x=(0 0.174533 0.349066 0.523599 0.698132 0.872665 1.0472 1.22173 1.39626 1.5708 1.74533 1.91986 2.0944)
              y=(0.00113686 -0.00629212 -0.105582 -0.253683 -0.414245 -0.579047 -0.747244 -0.91799 -1.09044 -1.26379 -1.43763 -1.61186 -1.78634)
        TransformAxis translation1: coordinates=knee_angle_l_beta axis=(1 0 0)
          MultiplierFunction: scale=0.958
            SimmSpline: x=(0 0.174533 0.349066 0.523599 0.698132 0.872665 1.0472 1.22173 1.39626 1.5708 1.74533 1.91986 2.0944)
                y=(0.0524 0.0488 0.0437 0.0371 0.0296 0.0216 0.0136 0.0057 -0.0019 -0.0088 -0.0148 -0.0196 -0.0227)
        TransformAxis translation2: coordinates=knee_angle_l_beta axis=(0 1 0)
          MultiplierFunction: scale=0.958
            SimmSpline: x=(0 0.174533 0.349066 0.523599 0.698132 0.872665 1.0472 1.22173 1.39626 1.5708 1.74533 1.91986 2.0944)
                y=(-0.0108 -0.019 -0.0263 -0.0322 -0.0367 -0.0395 -0.0408 -0.0404 -0.0384 -0.0349 -0.0301 -0.0245 -0.0187)
        TransformAxis translation3: axis=(0 0 1) MultiplierFunction(scale=0.958, Constant(value=-0.00275))
    PinJoint ankle_l: socket_parent_frame=tibia_l_offset socket_child_frame=talus_l_offset
      Coordinate ankle_angle_l: default_value=0 range=(-0.8726646 0.8726646) clamped=true
      PhysicalOffsetFrame tibia_l_offset: socket_parent=/bodyset/tibia_l translation=(-0.01149 -0.4596 0)
          orientation=(-0.175895 0.105208 0.0186622)
      PhysicalOffsetFrame talus_l_offset: socket_parent=/bodyset/talus_l translation=(0 0 0)
          orientation=(-0.175895 0.105208 0.0186622)
    PinJoint subtalar_l: socket_parent_frame=talus_l_offset socket_child_frame=calcn_l_offset
      Coordinate subtalar_angle_l: default_value=0 range=(-0.6108652 0.6108652) clamped=true locked=true
      PhysicalOffsetFrame talus_l_offset: socket_parent=/bodyset/talus_l
          translation=(-0.05575169 -0.06966892 -0.01186042) orientation=(1.76819 -0.906223 1.8196)
      PhysicalOffsetFrame calcn_l_offset: socket_parent=/bodyset/calcn_l translation=(0 0 0)
          orientation=(1.76819 -0.906223 1.8196)
    PinJoint mtp_l: socket_parent_frame=calcn_l_offset socket_child_frame=toes_l_offset
      Coordinate mtp_angle_l: default_value=0 range=(-0.7853982 0.5235988) clamped=true locked=true
      PhysicalOffsetFrame calcn_l_offset: socket_parent=/bodyset/calcn_l
          translation=(0.2043962 -0.003321522 -0.00161733) orientation=(-3.14159 -0.619901 0)
      PhysicalOffsetFrame toes_l_offset: socket_parent=/bodyset/toes_l translation=(0 0 0)
          orientation=(-3.14159 -0.619901 0)
    CustomJoint back: socket_parent_frame=pelvis_offset socket_child_frame=torso_offset
      Coordinate lumbar_extension: default_value=0 range=(-1.570796 1.570796) clamped=true
      Coordinate lumbar_bending: default_value=0 range=(-1.570796 1.570796) clamped=true
      Coordinate lumbar_rotation: default_value=0 range=(-1.570796 1.570796) clamped=true
      PhysicalOffsetFrame pelvis_offset: socket_parent=/bodyset/pelvis translation=(-0.1253344 0.0816359 0)
      PhysicalOffsetFrame torso_offset: socket_parent=/bodyset/torso translation=(0 0 0)
      SpatialTransform: axes_held_at_zero=(translation1 translation2 translation3)
        TransformAxis rotation1: coordinates=lumbar_extension axis=(0 0 1) LinearFunction(coefficients=1 0)
        TransformAxis rotation2: coordinates=lumbar_bending axis=(1 0 0) LinearFunction(coefficients=1 0)
        TransformAxis rotation3: coordinates=lumbar_rotation axis=(0 1 0) LinearFunction(coefficients=1 0)
    CustomJoint acromial_r: socket_parent_frame=torso_offset socket_child_frame=humerus_r_offset
      Coordinate arm_flex_r: default_value=0 range=(-1.570796 1.570796) clamped=true
      Coordinate arm_add_r: default_value=0 range=(-2.094395 1.570796) clamped=true
      Coordinate arm_rot_r: default_value=0 range=(-1.570796 1.570796) clamped=true
      PhysicalOffsetFrame torso_offset: socket_parent=/bodyset/torso translation=(0.00381796 0.4375564 0.2057221)
      PhysicalOffsetFrame humerus_r_offset: socket_parent=/bodyset/humerus_r translation=(0 0 0)
      SpatialTransform: axes_held_at_zero=(translation1 translation2 translation3)
        TransformAxis rotation1: coordinates=arm_flex_r axis=(0 0 1) LinearFunction(coefficients=1 0)
        TransformAxis rotation2: coordinates=arm_add_r axis=(1 0 0) LinearFunction(coefficients=1 0)
        TransformAxis rotation3: coordinates=arm_rot_r axis=(0 1 0) LinearFunction(coefficients=1 0)
    PinJoint elbow_r: socket_parent_frame=humerus_r_offset socket_child_frame=ulna_r_offset
      Coordinate elbow_flex_r: default_value=0 range=(0 2.618) clamped=true
      PhysicalOffsetFrame humerus_r_offset: socket_parent=/bodyset/humerus_r
          translation=(0.01443435 -0.3143764 -0.01053694) orientation=(-0.0228627 0.228018 0.0051689)
      PhysicalOffsetFrame ulna_r_offset: socket_parent=/bodyset/ulna_r translation=(0 0 0)
          orientation=(-0.0228627 0.228018 0.0051689)
    PinJoint radioulnar_r: socket_parent_frame=ulna_r_offset socket_child_frame=radius_r_offset
      Coordinate pro_sup_r: default_value=0 range=(0 2.09) clamped=true
      PhysicalOffsetFrame ulna_r_offset: socket_parent=/bodyset/ulna_r
          translation=(-0.006820976 -0.01318871 0.02644738) orientation=(-1.56884 0.056428 1.53614)
      PhysicalOffsetFrame radius_r_offset: socket_parent=/bodyset/radius_r translation=(0 0 0)
          orientation=(-1.56884 0.056428 1.53614)
    UniversalJoint radius_hand_r: socket_parent_frame=radius_r_offset socket_child_frame=hand_r_offset
      Coordinate wrist_flex_r: default_value=0 range=(-1.22173 1.22173) clamped=true locked=true
      Coordinate wrist_dev_r: default_value=0 range=(-0.4363323 0.6108652) clamped=true locked=true
      PhysicalOffsetFrame radius_r_offset: socket_parent=/bodyset/radius_r
          translation=(-0.008919894 -0.2391357 0.01380013) orientation=(-1.5708 0 -1.5708)
      PhysicalOffsetFrame hand_r_offset: socket_parent=/bodyset/hand_r translation=(0 0 0)
          orientation=(-1.5708 0 -1.5708)
    CustomJoint acromial_l: socket_parent_frame=torso_offset socket_child_frame=humerus_l_offset
      Coordinate arm_flex_l: default_value=0 range=(-1.570796 1.570796) clamped=true
      Coordinate arm_add_l: default_value=0 range=(-2.094395 1.570796) clamped=true
      Coordinate arm_rot_l: default_value=0 range=(-1.570796 1.570796) clamped=true
      PhysicalOffsetFrame torso_offset: socket_parent=/bodyset/torso translation=(0.00381796 0.4375564 -0.2057221)
      PhysicalOffsetFrame humerus_l_offset: socket_parent=/bodyset/humerus_l translation=(0 0 0)
      SpatialTransform: axes_held_at_zero=(translation1 translation2 translation3)
        TransformAxis rotation1: coordinates=arm_flex_l axis=(0 0 1) LinearFunction(coefficients=1 0)
        TransformAxis rotation2: coordinates=arm_add_l axis=(-1 0 0) LinearFunction(coefficients=1 0)
        TransformAxis rotation3: coordinates=arm_rot_l axis=(0 -1 0) LinearFunction(coefficients=1 0)
    PinJoint elbow_l: socket_parent_frame=humerus_l_offset socket_child_frame=ulna_l_offset
      Coordinate elbow_flex_l: default_value=0 range=(0 2.618) clamped=true
      PhysicalOffsetFrame humerus_l_offset: socket_parent=/bodyset/humerus_l
          translation=(0.01443435 -0.3143764 0.01053694) orientation=(0.0228627 -0.228018 0.0051689)
      PhysicalOffsetFrame ulna_l_offset: socket_parent=/bodyset/ulna_l translation=(0 0 0)
          orientation=(0.0228627 -0.228018 0.0051689)
    PinJoint radioulnar_l: socket_parent_frame=ulna_l_offset socket_child_frame=radius_l_offset
      Coordinate pro_sup_l: default_value=0 range=(0 2.09) clamped=true
      PhysicalOffsetFrame ulna_l_offset: socket_parent=/bodyset/ulna_l
          translation=(-0.006820976 -0.01318871 -0.02644738) orientation=(1.56884 -0.056428 1.53614)
      PhysicalOffsetFrame radius_l_offset: socket_parent=/bodyset/radius_l translation=(0 0 0)
          orientation=(1.56884 -0.056428 1.53614)
    UniversalJoint radius_hand_l: socket_parent_frame=radius_l_offset socket_child_frame=hand_l_offset
      Coordinate wrist_flex_l: default_value=0 range=(-1.22173 1.22173) clamped=true locked=true
      Coordinate wrist_dev_l: default_value=0 range=(-0.4363323 0.6108652) clamped=true locked=true
      PhysicalOffsetFrame radius_l_offset: socket_parent=/bodyset/radius_l
          translation=(-0.008919894 -0.2391357 -0.01380013) orientation=(1.5708 0 1.5708)
      PhysicalOffsetFrame hand_l_offset: socket_parent=/bodyset/hand_l translation=(0 0 0)
          orientation=(1.5708 0 1.5708)
  ConstraintSet:
    WeldConstraint Lat_Cond_r_Constraint: socket_frame1=lat_cond_r_offset socket_frame2=/bodyset/tibial_plat_r
      PhysicalOffsetFrame lat_cond_r_offset: socket_parent=/bodyset/lat_cond_r translation=(0 0.035 -0.02)
    WeldConstraint Lat_Cond_l_Constraint: socket_frame1=lat_cond_l_offset socket_frame2=/bodyset/tibial_plat_l
      PhysicalOffsetFrame lat_cond_l_offset: socket_parent=/bodyset/lat_cond_l translation=(0 0.035 0.02)
    CoordinateCouplerConstraint patellofemoral_knee_angle_r_con: independent_coordinate_names=knee_angle_r
        dependent_coordinate_name=knee_angle_r_beta scale_factor=1
        coupled_coordinates_function=LinearFunction(coefficients=1 0)
    CoordinateCouplerConstraint patellofemoral_knee_angle_l_con: independent_coordinate_names=knee_angle_l
        dependent_coordinate_name=knee_angle_l_beta scale_factor=1
        coupled_coordinates_function=LinearFunction(coefficients=1 0)
  ForceSet:
    Millard2012EquilibriumMuscle [values shared by the 80 below unless stated]: fiber_damping=0.1
        default_activation=0.01 minimum_activation=0.01
      ActiveForceLengthCurve: min_norm_active_fiber_length=0.25 transition_norm_fiber_length=0.77
          max_norm_active_fiber_length=1.9 shallow_ascending_slope=0.75 minimum_value=0
      ForceVelocityCurve: concentric_slope_at_vmax=0 concentric_slope_near_vmax=0.25 isometric_slope=5
          eccentric_slope_at_vmax=0 eccentric_slope_near_vmax=0.15 max_eccentric_velocity_force_multiplier=1.4
      TendonForceLengthCurve
    Millard2012EquilibriumMuscle addbrev_r: max_isometric_force=625.8197 optimal_fiber_length=0.1078748
        tendon_slack_length=0.03709208 pennation_angle_at_optimal=0.1147809 [radians]
      PathPoint P1: pelvis (-0.02377247 -0.09415674 0.01843932)
      PathPoint P2: femur_r (-0.001916 -0.113044 0.0238542)
      PathWrap: wrap_object=AB_at_femshaft_r method=hybrid
      FiberForceLengthCurve: strain_at_zero_force=-0.1844454 strain_at_one_norm_force=0.5059595
          stiffness_at_low_force=0.2 stiffness_at_one_norm_force=2.896851 curviness=0.75
    Millard2012EquilibriumMuscle addlong_r: max_isometric_force=916.8 optimal_fiber_length=0.1066921
        tendon_slack_length=0.1299626 pennation_angle_at_optimal=0.1377704
      PathPoint P1: pelvis (-0.00943431 -0.08904824 0.02260612)
      PathPoint P2: femur_r (0.01078708 -0.2293165 0.01516514)
      PathWrap: wrap_object=AL_at_femshaft_r method=hybrid
      FiberForceLengthCurve: strain_at_zero_force=-0.1942012 strain_at_one_norm_force=0.5013184
          stiffness_at_low_force=0.2 stiffness_at_one_norm_force=2.875548 curviness=0.75
    Millard2012EquilibriumMuscle addmagDist_r: max_isometric_force=597.2951 optimal_fiber_length=0.1706026
        tendon_slack_length=0.08412738 pennation_angle_at_optimal=0.194705
      PathPoint P1: pelvis (-0.09215255 -0.1278829 0.0476788)
      PathPoint P2: femur_r (0.0107775 -0.251475 0.0184894)
      PathWrap: wrap_object=AMdist_at_femshaft_r method=hybrid
      FiberForceLengthCurve: strain_at_zero_force=9.713794e-8 strain_at_one_norm_force=0.7000001
          stiffness_at_low_force=0.2 stiffness_at_one_norm_force=2.857143 curviness=0.75
    Millard2012EquilibriumMuscle addmagIsch_r: max_isometric_force=597.2951 optimal_fiber_length=0.1492211
        tendon_slack_length=0.2066769 pennation_angle_at_optimal=0.1680443
      PathPoint P1: pelvis (-0.1115439 -0.1299764 0.04994181)
      PathPoint P2: femur_r (0.00460798 -0.3716753 -0.03135534)
      PathWrap: wrap_object=AMisch_at_condyles_r method=hybrid
      FiberForceLengthCurve: strain_at_zero_force=0.005651991 strain_at_one_norm_force=0.7000408
          stiffness_at_low_force=0.2 stiffness_at_one_norm_force=2.880231 curviness=0.75
    Millard2012EquilibriumMuscle addmagMid_r: max_isometric_force=597.2951 optimal_fiber_length=0.1369058
        tendon_slack_length=0.04635877 pennation_angle_at_optimal=0.2073076
      PathPoint P1: pelvis (-0.06554232 -0.1209513 0.0341726)
      PathPoint P2: femur_r (0.00231836 -0.1555792 0.02799276)
      PathWrap: wrap_object=AMmid_at_femshaft_r method=hybrid
      FiberForceLengthCurve: strain_at_zero_force=1.776572e-8 strain_at_one_norm_force=0.7000001
          stiffness_at_low_force=0.2 stiffness_at_one_norm_force=2.857143 curviness=0.75
    Millard2012EquilibriumMuscle addmagProx_r: max_isometric_force=597.2951 optimal_fiber_length=0.114683
        tendon_slack_length=0.04379249 pennation_angle_at_optimal=0.3114833
      PathPoint P1: pelvis (-0.0385587 -0.1077293 0.01634394)
      PathPoint P2: femur_r (-0.01462866 -0.07554788 0.03067516)
      PathWrap: wrap_object=AMprox_at_femshaft_r method=hybrid
      FiberForceLengthCurve: strain_at_zero_force=8.055312e-8 strain_at_one_norm_force=0.7000001
          stiffness_at_low_force=0.2 stiffness_at_one_norm_force=2.857143 curviness=0.75
    Millard2012EquilibriumMuscle bflh_r: max_isometric_force=1313.184 optimal_fiber_length=0.09582032
        tendon_slack_length=0.3264354 pennation_angle_at_optimal=0.1759182
      PathPoint P1: pelvis (-0.1294417 -0.1192986 0.07016519)
      PathPoint P2: tibia_r (-0.03947964 -0.04191552 0.04157082)
      PathPoint P3: tibia_r (-0.03106896 -0.05754192 0.03993924)
      FiberForceLengthCurve: strain_at_zero_force=0.1368428 strain_at_one_norm_force=0.7054016
          stiffness_at_low_force=0.2 stiffness_at_one_norm_force=3.517666 curviness=0.75
    Millard2012EquilibriumMuscle bfsh_r: max_isometric_force=557.1148 optimal_fiber_length=0.1090649
        tendon_slack_length=0.1046323 pennation_angle_at_optimal=0.2642232
      PathPoint P1: femur_r (0.00479 -0.2022338 0.0224172)
      PathPoint P2: tibia_r (-0.03293034 -0.03773316 0.03681396)
      PathWrap: wrap_object=BF_at_gastroc_r method=hybrid
      FiberForceLengthCurve: strain_at_zero_force=0.04380442 strain_at_one_norm_force=0.6994891
          stiffness_at_low_force=0.2 stiffness_at_one_norm_force=3.050247 curviness=0.75
    Millard2012EquilibriumMuscle edl_r: max_isometric_force=603.4982 optimal_fiber_length=0.08144145
        tendon_slack_length=0.4335026 pennation_angle_at_optimal=0.2182582
      PathPoint P1: tibia_r (-0.018384 -0.1329393 0.0235545)
      PathPoint P2: tibia_r (0.0188436 -0.432024 0.0128688)
      PathPoint P3: calcn_r (0.105056 0.05978739 0.001198022)
      PathPoint P4: calcn_r (0.1847339 0.009134185 0.01946786)
      PathPoint P5: toes_r (0.0003429466 0.007805576 0.02291218)
      PathPoint P6: toes_r (0.05064179 -0.0006643044 0.0374382)
      FiberForceLengthCurve: strain_at_zero_force=0.1015352 strain_at_one_norm_force=0.7074931
          stiffness_at_low_force=0.2 stiffness_at_one_norm_force=3.30056 curviness=0.75
    Millard2012EquilibriumMuscle ehl_r: max_isometric_force=285.8675 optimal_fiber_length=0.0877965
        tendon_slack_length=0.383576 pennation_angle_at_optimal=0.1972681
      PathPoint P1: tibia_r (-0.016086 -0.178095 0.0217161)
      PathPoint P2: tibia_r (0.0081579 -0.3342441 0.0188436)
      PathPoint P3: tibia_r (0.02298 -0.4243257 -0.0032172)
      PathPoint P4: calcn_r (0.1108861 0.0646036 -0.03159784)
      PathPoint P5: calcn_r (0.14781 0.05131751 -0.03848647)
      PathPoint P6: calcn_r (0.1982232 0.02308458 -0.04193078)
      PathPoint P7: toes_r (0.03406603 0.00680912 -0.03668943)
      PathPoint P8: toes_r (0.06435965 0.005646587 -0.02785402)
      FiberForceLengthCurve: strain_at_zero_force=0.08168779 strain_at_one_norm_force=0.7147756
          stiffness_at_low_force=0.2 stiffness_at_one_norm_force=3.159119 curviness=0.75
    Millard2012EquilibriumMuscle fdl_r: max_isometric_force=423.177 optimal_fiber_length=0.05337008
        tendon_slack_length=0.4532542 pennation_angle_at_optimal=0.2248391
      PathPoint P1: tibia_r (-0.0026427 -0.2104968 -0.0020682)
      PathPoint P2: tibia_r (-0.0202224 -0.4188105 -0.0142476)
      PathPoint P3: calcn_r (0.04984158 0.05231397 -0.04193078)
      PathPoint P4: calcn_r (0.08093541 0.02922939 -0.03938498)
      PathPoint P5: calcn_r (0.1895352 -0.01345216 0.01737132)
      PathPoint P6: toes_r (-0.002171995 -0.01295393 0.02201366)
      PathPoint P7: toes_r (0.03257993 -0.0117914 0.03219685)
      PathPoint P8: toes_r (0.05041316 -0.009964565 0.03624018)
      FiberForceLengthCurve: strain_at_zero_force=-0.006468795 strain_at_one_norm_force=0.6998542
          stiffness_at_low_force=0.2 stiffness_at_one_norm_force=2.831566 curviness=0.75
    Millard2012EquilibriumMuscle fhl_r: max_isometric_force=907.8393 optimal_fiber_length=0.06232212
        tendon_slack_length=0.419036 pennation_angle_at_optimal=0.2580255
      PathPoint P1: tibia_r (-0.035619 -0.2485287 0.02298)
      PathPoint P2: tibia_r (-0.0278058 -0.4217979 -0.0087324)
      PathPoint P3: calcn_r (0.04275401 0.045837 -0.03609042)
      PathPoint P4: calcn_r (0.1186595 0.01129317 -0.03833671)
      PathPoint P5: calcn_r (0.1973086 -0.008802033 -0.0402835)
      PathPoint P6: toes_r (0.01771891 -0.01062887 -0.03968449)
      PathPoint P7: toes_r (0.06424534 -0.01693976 -0.02710526)
      FiberForceLengthCurve: strain_at_zero_force=0.007614866 strain_at_one_norm_force=0.7001852
          stiffness_at_low_force=0.2 stiffness_at_one_norm_force=2.887793 curviness=0.75
    Millard2012EquilibriumMuscle gaslat_r: max_isometric_force=1575.059 optimal_fiber_length=0.07916177
        tendon_slack_length=0.4290797 pennation_angle_at_optimal=0.2102268
      PathPoint P1: femur_r (0.001916 -0.364998 0.01972522)
      PathPoint P2: calcn_r (0.005029884 0.05148359 -0.007936898)
      PathWrap: wrap_object=GasLat_at_shank_r method=hybrid
      PathWrap pathwrap_0: wrap_object=GasLat_at_condyles_r method=hybrid
      FiberForceLengthCurve: strain_at_zero_force=-0.1932361 strain_at_one_norm_force=0.6636807
          stiffness_at_low_force=0.2 stiffness_at_one_norm_force=2.333949 curviness=0.75
    Millard2012EquilibriumMuscle gasmed_r: max_isometric_force=3115.515 optimal_fiber_length=0.067629
        tendon_slack_length=0.4436004 pennation_angle_at_optimal=0.1656816
      PathPoint P1: femur_r (0.005748 -0.36883 -0.021076)
      PathPoint P2: calcn_r (0.005029884 0.05148359 -0.007936898)
      PathWrap: wrap_object=GasMed_at_shank_r method=hybrid
      PathWrap pathwrap_0: wrap_object=GasMed_at_condyles_r method=hybrid
      FiberForceLengthCurve: strain_at_zero_force=0.1506325 strain_at_one_norm_force=0.550636
          stiffness_at_low_force=0.2 stiffness_at_one_norm_force=4.999956 curviness=0.75
    Millard2012EquilibriumMuscle glmax1_r: max_isometric_force=983.7836 optimal_fiber_length=0.151263
        tendon_slack_length=0.0898317 pennation_angle_at_optimal=0.3540118
      PathPoint P1: pelvis (-0.1532142 0.03455753 0.06741127)
      PathPoint P2: pelvis (-0.1564502 -0.02424035 0.0932742)
      PathPoint P3: femur_r (-0.0425352 -0.0312308 0.0289316)
      PathPoint P4: femur_r (-0.0265366 -0.0542228 0.045026)
      PathWrap: wrap_object=Gmax1_at_pelvis_r method=hybrid
      FiberForceLengthCurve: strain_at_zero_force=2.229005e-7 strain_at_one_norm_force=0.6999999
          stiffness_at_low_force=0.2 stiffness_at_one_norm_force=2.857144 curviness=0.75
    Millard2012EquilibriumMuscle glmax2_r: max_isometric_force=1406.046 optimal_fiber_length=0.1634475
        tendon_slack_length=0.1134763 pennation_angle_at_optimal=0.3673821
      PathPoint P1: pelvis (-0.163918 0.008714507 0.05531795)
      PathPoint P2: pelvis (-0.1672785 -0.06100155 0.09734522)
      PathPoint P3: femur_r (-0.04311 -0.0559472 0.0241416)
      PathPoint P4: femur_r (-0.0149448 -0.0973328 0.0401402)
      PathWrap: wrap_object=Gmax2_at_pelvis_r method=hybrid
      FiberForceLengthCurve: strain_at_zero_force=1.628612e-7 strain_at_one_norm_force=0.7000001
          stiffness_at_low_force=0.2 stiffness_at_one_norm_force=2.857143 curviness=0.75
    Millard2012EquilibriumMuscle glmax3_r: max_isometric_force=947.7541 optimal_fiber_length=0.1757076
        tendon_slack_length=0.1083705 pennation_angle_at_optimal=0.3824161
      PathPoint P1: pelvis (-0.1618022 -0.05258754 0.01077622)
      PathPoint P2: pelvis (-0.1584416 -0.1265106 0.05208508)
      PathPoint P3: femur_r (-0.0269198 -0.107775 0.0090052)
      PathPoint P4: femur_r (-0.005748 -0.1359402 0.0393738)
      PathWrap: wrap_object=Gmax3_at_pelvis_r method=hybrid
      FiberForceLengthCurve: strain_at_zero_force=0.03977768 strain_at_one_norm_force=0.7004988
          stiffness_at_low_force=0.2 stiffness_at_one_norm_force=3.026996 curviness=0.75
    Millard2012EquilibriumMuscle glmed1_r: max_isometric_force=1093.467 optimal_fiber_length=0.07549905
        tendon_slack_length=0.05773457 pennation_angle_at_optimal=0.3165559
      PathPoint P1: pelvis (-0.06098696 0.02604335 0.1376962)
      PathPoint P2_0: femur_r (-0.013412 -0.017244 0.056522)
      FiberForceLengthCurve: strain_at_zero_force=6.185261e-8 strain_at_one_norm_force=0.7000001
          stiffness_at_low_force=0.2 stiffness_at_one_norm_force=2.857143 curviness=0.75
    Millard2012EquilibriumMuscle glmed2_r: max_isometric_force=765.0917 optimal_fiber_length=0.08361509
        tendon_slack_length=0.07510426 pennation_angle_at_optimal=0.3165559
      PathPoint P1: pelvis (-0.1057937 0.05509171 0.09818337)
      PathPoint P2_0: femur_r (-0.021076 -0.00958 0.053648)
      FiberForceLengthCurve: strain_at_zero_force=-0.1329608 strain_at_one_norm_force=0.6904088
          stiffness_at_low_force=0.2 stiffness_at_one_norm_force=2.429043 curviness=0.75
    Millard2012EquilibriumMuscle glmed3_r: max_isometric_force=871.1993 optimal_fiber_length=0.07946295
        tendon_slack_length=0.04924464 pennation_angle_at_optimal=0.3165559
      PathPoint P1: pelvis (-0.1244632 0.01602668 0.07663092)
      PathPoint P2_0: femur_r (-0.0296022 -0.0045026 0.0496244)
      FiberForceLengthCurve: strain_at_zero_force=-0.1914236 strain_at_one_norm_force=0.6558113
          stiffness_at_low_force=0.2 stiffness_at_one_norm_force=2.360621 curviness=0.75
    Millard2012EquilibriumMuscle glmin1_r: max_isometric_force=374.0459 optimal_fiber_length=0.0814046
        tendon_slack_length=0.01932483 pennation_angle_at_optimal=0.1745329
      PathPoint P1: pelvis (-0.03733896 0 0.1412883)
      PathPoint P2: femur_r (0.00479 -0.01437 0.053648)
      FiberForceLengthCurve: strain_at_zero_force=-8.172674e-8 strain_at_one_norm_force=0.7000001
          stiffness_at_low_force=0.2 stiffness_at_one_norm_force=2.857142 curviness=0.75
    Millard2012EquilibriumMuscle glmin2_r: max_isometric_force=394.8197 optimal_fiber_length=0.06748752
        tendon_slack_length=0.03145488 pennation_angle_at_optimal=0
      PathPoint P1: pelvis (-0.07666933 0.01001667 0.1209332)
      PathPoint P2: femur_r (0.003832 -0.008622 0.049816)
      FiberForceLengthCurve: strain_at_zero_force=0.001146607 strain_at_one_norm_force=0.6999804
          stiffness_at_low_force=0.2 stiffness_at_one_norm_force=2.861911 curviness=0.75
    Millard2012EquilibriumMuscle glmin3_r: max_isometric_force=446.7738 optimal_fiber_length=0.03530987
        tendon_slack_length=0.0472132 pennation_angle_at_optimal=0.01745329
      PathPoint P1: pelvis (-0.09820146 -0.01552585 0.09554918)
      PathPoint P2: femur_r (-0.003832 -0.000958 0.048858)
      FiberForceLengthCurve: strain_at_zero_force=-0.0351512 strain_at_one_norm_force=0.6990981
          stiffness_at_low_force=0.2 stiffness_at_one_norm_force=2.723871 curviness=0.75
    Millard2012EquilibriumMuscle grac_r: max_isometric_force=281.3115 optimal_fiber_length=0.2244553
        tendon_slack_length=0.1694882 pennation_angle_at_optimal=0.1720016
      PathPoint P1: pelvis (-0.05894577 -0.1295356 0.02940712)
      PathPoint P2: tibia_r (-0.02116458 -0.05463495 -0.03402189)
      PathPoint P3: tibia_r (0.00204522 -0.07999338 -0.01807377)
      PathWrap: wrap_object=GR_at_condyles_r method=hybrid
      FiberForceLengthCurve: strain_at_zero_force=-0.1885953 strain_at_one_norm_force=0.7244614
          stiffness_at_low_force=0.2 stiffness_at_one_norm_force=2.190445 curviness=0.75
    Millard2012EquilibriumMuscle iliacus_r: max_isometric_force=1021.141 optimal_fiber_length=0.1112431
        tendon_slack_length=0.1003074 pennation_angle_at_optimal=0.279914
      PathPoint P1: pelvis (-0.07530023 0.03095152 0.1009373)
      PathPoint P2: pelvis (-0.01680253 -0.05579288 0.09052028)
      PathPoint P3: femur_r (-0.0022034 -0.054127 0.0133162)
      PathPoint P4: femur_r (-0.0116876 -0.0610246 0.0187768)
      PathWrap: wrap_object=IL_at_brim_r method=hybrid range=(2 3)
      FiberForceLengthCurve: strain_at_zero_force=-0.1607227 strain_at_one_norm_force=0.5020882
          stiffness_at_low_force=0.2 stiffness_at_one_norm_force=3.017452 curviness=0.75
    Millard2012EquilibriumMuscle perbrev_r: max_isometric_force=521.2016 optimal_fiber_length=0.05489738
        tendon_slack_length=0.1783893 pennation_angle_at_optimal=0.2052361
      PathPoint P1: tibia_r (-0.0279207 -0.2909268 0.0288399)
      PathPoint P2: tibia_r (-0.0389511 -0.4473057 0.0286101)
      PathPoint P3: tibia_r (-0.0327465 -0.4600596 0.0292995)
      PathPoint P4: calcn_r (0.05384262 0.04484054 0.0348924)
      PathPoint P5: calcn_r (0.07739163 0.03637066 0.05136521)
      FiberForceLengthCurve: strain_at_zero_force=-0.02868018 strain_at_one_norm_force=0.6992207
          stiffness_at_low_force=0.2 stiffness_at_one_norm_force=2.747627 curviness=0.75
    Millard2012EquilibriumMuscle perlong_r: max_isometric_force=1115.371 optimal_fiber_length=0.06195446
        tendon_slack_length=0.4051685 pennation_angle_at_optimal=0.2479525
      PathPoint P1: tibia_r (-0.02298 -0.1577577 0.0324018)
      PathPoint P2: tibia_r (-0.0364233 -0.44811 0.0272313)
      PathPoint P3: tibia_r (-0.0312528 -0.4612086 0.027576)
      PathPoint P4: calcn_r (0.05007021 0.0381975 0.03309537)
      PathPoint P5: calcn_r (0.07784889 0.01760407 0.04252979)
      PathPoint P6: calcn_r (0.09739685 0.01145925 0.01767083)
      PathPoint P7: calcn_r (0.1375216 0.01411647 -0.02755451)
      FiberForceLengthCurve: strain_at_zero_force=-0.08769079 strain_at_one_norm_force=0.6966414
          stiffness_at_low_force=0.2 stiffness_at_one_norm_force=2.54994 curviness=0.75
    Millard2012EquilibriumMuscle piri_r: max_isometric_force=1029.787 optimal_fiber_length=0.02870658
        tendon_slack_length=0.1268679 pennation_angle_at_optimal=0.1745329
      PathPoint P1: pelvis (-0.126716 -0.006540888 0.01617631)
      PathPoint P2: pelvis (-0.1269774 -0.03071112 0.07294306)
      PathPoint P3: femur_r (-0.0141784 -0.0034488 0.0418646)
      FiberForceLengthCurve: strain_at_zero_force=-0.1828826 strain_at_one_norm_force=0.7031405
          stiffness_at_low_force=0.2 stiffness_at_one_norm_force=2.257277 curviness=0.75
    Millard2012EquilibriumMuscle psoas_r: max_isometric_force=1426.79 optimal_fiber_length=0.1209551
        tendon_slack_length=0.1029962 pennation_angle_at_optimal=0.2155251
      PathPoint P1: pelvis (-0.0754247 0.06210338 0.04669697)
      PathPoint P2: pelvis (-0.02551495 -0.06550905 0.0785467)
      PathPoint P3: femur_r (-0.0126456 -0.0447386 0.0044068)
      PathPoint P4: femur_r (-0.022513 -0.0501992 0.0084304)
      PathWrap: wrap_object=PS_at_brim_r method=hybrid range=(2 3)
      FiberForceLengthCurve: strain_at_zero_force=-0.07629291 strain_at_one_norm_force=0.5032605
          stiffness_at_low_force=0.2 stiffness_at_one_norm_force=3.450933 curviness=0.75
    Millard2012EquilibriumMuscle recfem_r: max_isometric_force=2191.741 optimal_fiber_length=0.07451264
        tendon_slack_length=0.4421703 pennation_angle_at_optimal=0.2170149
      PathPoint P1: pelvis (-0.02987117 -0.0388647 0.1117135)
      PathPoint P2: patella_r (0.00958 0.046942 0.0006706)
      PathPoint P3: patella_r (0.0115918 0.0418646 -0.000958)
      PathPoint P4: patella_r (0.00479 0.00236626 2.874e-5)
      PathPoint P5: tibia_r (0.0374574 -0.07252488 -0.00054003)
      PathWrap: wrap_object=KnExt_at_fem_r method=hybrid
      FiberForceLengthCurve: strain_at_zero_force=0.1997943 strain_at_one_norm_force=0.8997465
          stiffness_at_low_force=0.2 stiffness_at_one_norm_force=2.857338 curviness=0.75
    Millard2012EquilibriumMuscle sart_r: max_isometric_force=249.4131 optimal_fiber_length=0.4039561
        tendon_slack_length=0.124294 pennation_angle_at_optimal=0.02613542
      PathPoint P1: pelvis (-0.02427032 -0.01562601 0.126441)
      PathPoint P2: femur_r (-0.002874 -0.3418144 -0.0403318)
      PathPoint P3: tibia_r (-0.0288399 -0.0460749 -0.0419385)
      PathPoint P4: tibia_r (-0.0182691 -0.0688251 -0.0303336)
      PathPoint P5: tibia_r (0.0156264 -0.093069 -0.0029874)
      FiberForceLengthCurve: strain_at_zero_force=-0.07294162 strain_at_one_norm_force=0.7021361
          stiffness_at_low_force=0.2 stiffness_at_one_norm_force=2.580386 curviness=0.75
    Millard2012EquilibriumMuscle semimem_r: max_isometric_force=2200.987 optimal_fiber_length=0.08375938
        tendon_slack_length=0.326272 pennation_angle_at_optimal=0.2545615
      PathPoint P1: pelvis (-0.1228452 -0.1141901 0.07351779)
      PathPoint P2: tibia_r (-0.031023 -0.047109 -0.0225204)
      PathWrap: wrap_object=SM_at_condyles_r method=hybrid
      FiberForceLengthCurve: strain_at_zero_force=0.1537347 strain_at_one_norm_force=0.7044745
          stiffness_at_low_force=0.2 stiffness_at_one_norm_force=3.631479 curviness=0.75
    Millard2012EquilibriumMuscle semiten_r: max_isometric_force=591.2951 optimal_fiber_length=0.1912879
        tendon_slack_length=0.2450061 pennation_angle_at_optimal=0.241295
      PathPoint P1: pelvis (-0.1291928 -0.1255089 0.06166395)
      PathPoint P2: tibia_r (-0.0358488 -0.0583692 -0.0263121)
      PathPoint P3: tibia_r (0.0021831 -0.0888177 -0.0134433)
      PathWrap: wrap_object=ST_at_condyles_r method=hybrid
      FiberForceLengthCurve: strain_at_zero_force=0.114169 strain_at_one_norm_force=0.7136122
          stiffness_at_low_force=0.2 stiffness_at_one_norm_force=3.336429 curviness=0.75
    Millard2012EquilibriumMuscle soleus_r: max_isometric_force=6194.843 optimal_fiber_length=0.05130401
        tendon_slack_length=0.3280542 pennation_angle_at_optimal=0.3814289
      PathPoint P1: tibia_r (-0.0087324 -0.1052484 0.0112602)
      PathPoint P2: calcn_r (0.005029884 0.05148359 -0.007936898)
      FiberForceLengthCurve: strain_at_zero_force=0.04016445 strain_at_one_norm_force=0.7659521
          stiffness_at_low_force=0.2 stiffness_at_one_norm_force=2.755627 curviness=0.75
    Millard2012EquilibriumMuscle tfl_r: max_isometric_force=411.2066 optimal_fiber_length=0.09149587
        tendon_slack_length=0.4329233 pennation_angle_at_optimal=0.05235988
      PathPoint P1: pelvis (-0.02489264 0.01101834 0.1544592)
      PathPoint P2: femur_r (0.0281652 -0.095321 0.0571926)
      PathPoint P3: femur_r (0.0102506 -0.38799 0.0310392)
      PathPoint P4: tibia_r (0.0124092 -0.047109 0.0397554)
      FiberForceLengthCurve: strain_at_zero_force=0.1571908 strain_at_one_norm_force=0.6394004
          stiffness_at_low_force=0.2 stiffness_at_one_norm_force=4.147574 curviness=0.75
    Millard2012EquilibriumMuscle tibant_r: max_isometric_force=1227.452 optimal_fiber_length=0.08112939
        tendon_slack_length=0.2856289 pennation_angle_at_optimal=0.1951828
      PathPoint P1: tibia_r (0.0176946 -0.1507488 0.0186138)
      PathPoint P2: tibia_r (0.0288399 -0.2189994 0.0147072)
      PathPoint P3: tibia_r (0.0267717 -0.4204191 -0.0151668)
      PathPoint P4: calcn_r (0.1332919 0.02956154 -0.0456746)
      FiberForceLengthCurve: strain_at_zero_force=0.1588072 strain_at_one_norm_force=0.7083715
          stiffness_at_low_force=0.2 stiffness_at_one_norm_force=3.639246 curviness=0.75
    Millard2012EquilibriumMuscle tibpost_r: max_isometric_force=1730.154 optimal_fiber_length=0.04458645
        tendon_slack_length=0.3311896 pennation_angle_at_optimal=0.2264891
      PathPoint P1: tibia_r (-0.0047109 -0.1498296 0.0118347)
      PathPoint P2: tibia_r (-0.0188436 -0.4199595 -0.0201075)
      PathPoint P3: calcn_r (0.04766958 0.05546941 -0.0428293)
      PathPoint P4: calcn_r (0.0882516 0.0264061 -0.04208053)
      FiberForceLengthCurve: strain_at_zero_force=-0.07310113 strain_at_one_norm_force=0.698029
          stiffness_at_low_force=0.2 stiffness_at_one_norm_force=2.593596 curviness=0.75
    Millard2012EquilibriumMuscle vasint_r: max_isometric_force=1697.361 optimal_fiber_length=0.1165027
        tendon_slack_length=0.2041287 pennation_angle_at_optimal=0.06309973
      PathPoint P1: femur_r (0.027782 -0.1843192 0.029698)
      PathPoint P2: femur_r (0.032093 -0.1996472 0.027303)
      PathPoint P3: patella_r (0.0055564 0.045984 -0.0005748)
      PathPoint P4: patella_r (0.00479 0.00236626 -0.00037362)
      PathPoint P5: tibia_r (0.03742293 -0.0726168 0.00049407)
      PathWrap: wrap_object=KnExt_at_fem_r method=hybrid
      FiberForceLengthCurve: strain_at_zero_force=0.1756531 strain_at_one_norm_force=0.7074754
          stiffness_at_low_force=0.2 stiffness_at_one_norm_force=3.760655 curviness=0.75
    Millard2012EquilibriumMuscle vaslat_r: max_isometric_force=5148.767 optimal_fiber_length=0.1162985
        tendon_slack_length=0.2196749 pennation_angle_at_optimal=0.2528673
      PathPoint P1: femur_r (0.0045984 -0.1776132 0.0334342)
      PathPoint P2: femur_r (0.0257702 -0.2482178 0.0391822)
      PathPoint P3: patella_r (0.0098674 0.0405234 0.0135078)
      PathPoint P4: patella_r (0.00479 0.00236626 0.00702214)
      PathPoint P5: tibia_r (0.03738846 -0.07282362 0.00587139)
      PathWrap: wrap_object=KnExtVL_at_fem_r method=hybrid
      FiberForceLengthCurve: strain_at_zero_force=0.1934746 strain_at_one_norm_force=0.711135
          stiffness_at_low_force=0.2 stiffness_at_one_norm_force=3.863536 curviness=0.75
    Millard2012EquilibriumMuscle vasmed_r: max_isometric_force=2747.823 optimal_fiber_length=0.1097075
        tendon_slack_length=0.2074469 pennation_angle_at_optimal=0.4222225
      PathPoint P1: femur_r (0.013412 -0.2010842 0.0180104)
      PathPoint P2: femur_r (0.0341048 -0.2652702 0.0008622)
      PathPoint P3: patella_r (0.0060354 0.042631 -0.016286)
      PathPoint P4: patella_r (0.00479 0.00236626 -0.008143)
      PathPoint P5: tibia_r (0.0366531 -0.07304193 -0.00779022)
      PathWrap: wrap_object=KnExt_at_fem_r method=hybrid
      FiberForceLengthCurve: strain_at_zero_force=0.1780858 strain_at_one_norm_force=0.706013
          stiffness_at_low_force=0.2 stiffness_at_one_norm_force=3.788401 curviness=0.75
    Millard2012EquilibriumMuscle addbrev_l: max_isometric_force=625.8197 optimal_fiber_length=0.1078748
        tendon_slack_length=0.03709208 pennation_angle_at_optimal=0.1147809
      PathPoint P1: pelvis (-0.02377247 -0.09415674 -0.01843932)
      PathPoint P2: femur_l (-0.001916 -0.113044 -0.0238542)
      PathWrap: wrap_object=AB_at_femshaft_l method=hybrid
      FiberForceLengthCurve: strain_at_zero_force=-0.1844454 strain_at_one_norm_force=0.5059595
          stiffness_at_low_force=0.2 stiffness_at_one_norm_force=2.896851 curviness=0.75
    Millard2012EquilibriumMuscle addlong_l: max_isometric_force=916.8 optimal_fiber_length=0.1066921
        tendon_slack_length=0.1299626 pennation_angle_at_optimal=0.1377704
      PathPoint P1: pelvis (-0.00943431 -0.08904824 -0.02260612)
      PathPoint P2: femur_l (0.01078708 -0.2293165 -0.01516514)
      PathWrap: wrap_object=AL_at_femshaft_l method=hybrid
      FiberForceLengthCurve: strain_at_zero_force=-0.1942012 strain_at_one_norm_force=0.5013184
          stiffness_at_low_force=0.2 stiffness_at_one_norm_force=2.875548 curviness=0.75
    Millard2012EquilibriumMuscle addmagDist_l: max_isometric_force=597.2951 optimal_fiber_length=0.1706026
        tendon_slack_length=0.08412738 pennation_angle_at_optimal=0.194705
      PathPoint P1: pelvis (-0.09215255 -0.1278829 -0.0476788)
      PathPoint P2: femur_l (0.0107775 -0.251475 -0.0184894)
      PathWrap: wrap_object=AMdist_at_femshaft_l method=hybrid
      FiberForceLengthCurve: strain_at_zero_force=9.713794e-8 strain_at_one_norm_force=0.7000001
          stiffness_at_low_force=0.2 stiffness_at_one_norm_force=2.857143 curviness=0.75
    Millard2012EquilibriumMuscle addmagIsch_l: max_isometric_force=597.2951 optimal_fiber_length=0.1492211
        tendon_slack_length=0.2066769 pennation_angle_at_optimal=0.1680443
      PathPoint P1: pelvis (-0.1115439 -0.1299764 -0.04994181)
      PathPoint P2: femur_l (0.00460798 -0.3716753 0.03135534)
      PathWrap: wrap_object=AMisch_at_condyles_l method=hybrid
      FiberForceLengthCurve: strain_at_zero_force=0.005651991 strain_at_one_norm_force=0.7000408
          stiffness_at_low_force=0.2 stiffness_at_one_norm_force=2.880231 curviness=0.75
    Millard2012EquilibriumMuscle addmagMid_l: max_isometric_force=597.2951 optimal_fiber_length=0.1369058
        tendon_slack_length=0.04635877 pennation_angle_at_optimal=0.2073076
      PathPoint P1: pelvis (-0.06554232 -0.1209513 -0.0341726)
      PathPoint P2: femur_l (0.00231836 -0.1555792 -0.02799276)
      PathWrap: wrap_object=AMmid_at_femshaft_l method=hybrid
      FiberForceLengthCurve: strain_at_zero_force=1.776572e-8 strain_at_one_norm_force=0.7000001
          stiffness_at_low_force=0.2 stiffness_at_one_norm_force=2.857143 curviness=0.75
    Millard2012EquilibriumMuscle addmagProx_l: max_isometric_force=597.2951 optimal_fiber_length=0.114683
        tendon_slack_length=0.04379249 pennation_angle_at_optimal=0.3114833
      PathPoint P1: pelvis (-0.0385587 -0.1077293 -0.01634394)
      PathPoint P2: femur_l (-0.01462866 -0.07554788 -0.03067516)
      PathWrap: wrap_object=AMprox_at_femshaft_l method=hybrid
      FiberForceLengthCurve: strain_at_zero_force=8.055312e-8 strain_at_one_norm_force=0.7000001
          stiffness_at_low_force=0.2 stiffness_at_one_norm_force=2.857143 curviness=0.75
    Millard2012EquilibriumMuscle bflh_l: max_isometric_force=1313.184 optimal_fiber_length=0.09582016
        tendon_slack_length=0.3264354 pennation_angle_at_optimal=0.1759182
      PathPoint P1: pelvis (-0.1294417 -0.1192986 -0.07016519)
      PathPoint P2: tibia_l (-0.03947964 -0.04191552 -0.04157082)
      PathPoint P3: tibia_l (-0.03106896 -0.05754192 -0.03993924)
      FiberForceLengthCurve: strain_at_zero_force=0.1368428 strain_at_one_norm_force=0.7054016
          stiffness_at_low_force=0.2 stiffness_at_one_norm_force=3.517666 curviness=0.75
    Millard2012EquilibriumMuscle bfsh_l: max_isometric_force=557.1148 optimal_fiber_length=0.1090647
        tendon_slack_length=0.1046321 pennation_angle_at_optimal=0.2642232
      PathPoint P1: femur_l (0.00479 -0.2022338 -0.0224172)
      PathPoint P2: tibia_l (-0.03293034 -0.03773316 -0.03681396)
      PathWrap: wrap_object=BF_at_gastroc_l method=hybrid
      FiberForceLengthCurve: strain_at_zero_force=0.04380442 strain_at_one_norm_force=0.6994891
          stiffness_at_low_force=0.2 stiffness_at_one_norm_force=3.050247 curviness=0.75
    Millard2012EquilibriumMuscle edl_l: max_isometric_force=603.4982 optimal_fiber_length=0.08144145
        tendon_slack_length=0.4335026 pennation_angle_at_optimal=0.2182582
      PathPoint P1: tibia_l (-0.018384 -0.1329393 -0.0235545)
      PathPoint P2: tibia_l (0.0188436 -0.432024 -0.0128688)
      PathPoint P3: calcn_l (0.105056 0.05978739 -0.001198022)
      PathPoint P4: calcn_l (0.1847339 0.009134185 -0.01946786)
      PathPoint P5: toes_l (0.0003429466 0.007805576 -0.02291218)
      PathPoint P6: toes_l (0.05064179 -0.0006643044 -0.0374382)
      FiberForceLengthCurve: strain_at_zero_force=0.1015352 strain_at_one_norm_force=0.7074931
          stiffness_at_low_force=0.2 stiffness_at_one_norm_force=3.30056 curviness=0.75
    Millard2012EquilibriumMuscle ehl_l: max_isometric_force=285.8675 optimal_fiber_length=0.0877965
        tendon_slack_length=0.383576 pennation_angle_at_optimal=0.1972681
      PathPoint P1: tibia_l (-0.016086 -0.178095 -0.0217161)
      PathPoint P2: tibia_l (0.0081579 -0.3342441 -0.0188436)
      PathPoint P3: tibia_l (0.02298 -0.4243257 0.0032172)
      PathPoint P4: calcn_l (0.1108861 0.0646036 0.03159784)
      PathPoint P5: calcn_l (0.14781 0.05131751 0.03848647)
      PathPoint P6: calcn_l (0.1982232 0.02308458 0.04193078)
      PathPoint P7: toes_l (0.03406603 0.00680912 0.03668943)
      PathPoint P8: toes_l (0.06435965 0.005646587 0.02785402)
      FiberForceLengthCurve: strain_at_zero_force=0.08168779 strain_at_one_norm_force=0.7147756
          stiffness_at_low_force=0.2 stiffness_at_one_norm_force=3.159119 curviness=0.75
    Millard2012EquilibriumMuscle fdl_l: max_isometric_force=423.177 optimal_fiber_length=0.05337008
        tendon_slack_length=0.4532542 pennation_angle_at_optimal=0.2248391
      PathPoint P1: tibia_l (-0.0026427 -0.2104968 0.0020682)
      PathPoint P2: tibia_l (-0.0202224 -0.4188105 0.0142476)
      PathPoint P3: calcn_l (0.04984158 0.05231397 0.04193078)
      PathPoint P4: calcn_l (0.08093541 0.02922939 0.03938498)
      PathPoint P5: calcn_l (0.1895352 -0.01345216 -0.01737132)
      PathPoint P6: toes_l (-0.002171995 -0.01295393 -0.02201366)
      PathPoint P7: toes_l (0.03257993 -0.0117914 -0.03219685)
      PathPoint P8: toes_l (0.05041316 -0.009964565 -0.03624018)
      FiberForceLengthCurve: strain_at_zero_force=-0.006468795 strain_at_one_norm_force=0.6998542
          stiffness_at_low_force=0.2 stiffness_at_one_norm_force=2.831566 curviness=0.75
    Millard2012EquilibriumMuscle fhl_l: max_isometric_force=907.8393 optimal_fiber_length=0.06232212
        tendon_slack_length=0.419036 pennation_angle_at_optimal=0.2580255
      PathPoint P1: tibia_l (-0.035619 -0.2485287 -0.02298)
      PathPoint P2: tibia_l (-0.0278058 -0.4217979 0.0087324)
      PathPoint P3: calcn_l (0.04275401 0.045837 0.03609042)
      PathPoint P4: calcn_l (0.1186595 0.01129317 0.03833671)
      PathPoint P5: calcn_l (0.1973086 -0.008802033 0.0402835)
      PathPoint P6: toes_l (0.01771891 -0.01062887 0.03968449)
      PathPoint P7: toes_l (0.06424534 -0.01693976 0.02710526)
      FiberForceLengthCurve: strain_at_zero_force=0.007614866 strain_at_one_norm_force=0.7001852
          stiffness_at_low_force=0.2 stiffness_at_one_norm_force=2.887793 curviness=0.75
    Millard2012EquilibriumMuscle gaslat_l: max_isometric_force=1575.059 optimal_fiber_length=0.07916177
        tendon_slack_length=0.4290797 pennation_angle_at_optimal=0.2102268
      PathPoint P1: femur_l (0.001916 -0.364998 -0.01972522)
      PathPoint P2: calcn_l (0.005029884 0.05148359 0.007936898)
      PathWrap: wrap_object=GasLat_at_shank_l method=hybrid
      PathWrap pathwrap_0: wrap_object=GasLat_at_condyles_l method=hybrid
      FiberForceLengthCurve: strain_at_zero_force=-0.1932361 strain_at_one_norm_force=0.6636807
          stiffness_at_low_force=0.2 stiffness_at_one_norm_force=2.333949 curviness=0.75
    Millard2012EquilibriumMuscle gasmed_l: max_isometric_force=3115.515 optimal_fiber_length=0.067629
        tendon_slack_length=0.4436004 pennation_angle_at_optimal=0.1656816
      PathPoint P1: femur_l (0.005748 -0.36883 0.021076)
      PathPoint P2: calcn_l (0.005029884 0.05148359 0.007936898)
      PathWrap: wrap_object=GasMed_at_shank_l method=hybrid
      PathWrap pathwrap_0: wrap_object=GasMed_at_condyles_l method=hybrid
      FiberForceLengthCurve: strain_at_zero_force=0.1506325 strain_at_one_norm_force=0.550636
          stiffness_at_low_force=0.2 stiffness_at_one_norm_force=4.999956 curviness=0.75
    Millard2012EquilibriumMuscle glmax1_l: max_isometric_force=983.7836 optimal_fiber_length=0.151263
        tendon_slack_length=0.0898317 pennation_angle_at_optimal=0.3540118
      PathPoint P1: pelvis (-0.1532142 0.03455753 -0.06741127)
      PathPoint P2: pelvis (-0.1564502 -0.02424035 -0.0932742)
      PathPoint P3: femur_l (-0.0425352 -0.0312308 -0.0289316)
      PathPoint P4: femur_l (-0.0265366 -0.0542228 -0.045026)
      PathWrap: wrap_object=Gmax1_at_pelvis_l method=hybrid
      FiberForceLengthCurve: strain_at_zero_force=2.229005e-7 strain_at_one_norm_force=0.6999999
          stiffness_at_low_force=0.2 stiffness_at_one_norm_force=2.857144 curviness=0.75
    Millard2012EquilibriumMuscle glmax2_l: max_isometric_force=1406.046 optimal_fiber_length=0.1634475
        tendon_slack_length=0.1134763 pennation_angle_at_optimal=0.3673821
      PathPoint P1: pelvis (-0.163918 0.008714507 -0.05531795)
      PathPoint P2: pelvis (-0.1672785 -0.06100155 -0.09734522)
      PathPoint P3: femur_l (-0.04311 -0.0559472 -0.0241416)
      PathPoint P4: femur_l (-0.0149448 -0.0973328 -0.0401402)
      PathWrap: wrap_object=Gmax2_at_pelvis_l method=hybrid
      FiberForceLengthCurve: strain_at_zero_force=1.628612e-7 strain_at_one_norm_force=0.7000001
          stiffness_at_low_force=0.2 stiffness_at_one_norm_force=2.857143 curviness=0.75
    Millard2012EquilibriumMuscle glmax3_l: max_isometric_force=947.7541 optimal_fiber_length=0.1757076
        tendon_slack_length=0.1083705 pennation_angle_at_optimal=0.3824161
      PathPoint P1: pelvis (-0.1618022 -0.05258754 -0.01077622)
      PathPoint P2: pelvis (-0.1584416 -0.1265106 -0.05208508)
      PathPoint P3: femur_l (-0.0269198 -0.107775 -0.0090052)
      PathPoint P4: femur_l (-0.005748 -0.1359402 -0.0393738)
      PathWrap: wrap_object=Gmax3_at_pelvis_l method=hybrid
      FiberForceLengthCurve: strain_at_zero_force=0.03977768 strain_at_one_norm_force=0.7004988
          stiffness_at_low_force=0.2 stiffness_at_one_norm_force=3.026996 curviness=0.75
    Millard2012EquilibriumMuscle glmed1_l: max_isometric_force=1093.467 optimal_fiber_length=0.07549905
        tendon_slack_length=0.05773457 pennation_angle_at_optimal=0.3165559
      PathPoint P1: pelvis (-0.06098696 0.02604335 -0.1376962)
      PathPoint P2: femur_l (-0.013412 -0.017244 -0.056522)
      FiberForceLengthCurve: strain_at_zero_force=6.185261e-8 strain_at_one_norm_force=0.7000001
          stiffness_at_low_force=0.2 stiffness_at_one_norm_force=2.857143 curviness=0.75
    Millard2012EquilibriumMuscle glmed2_l: max_isometric_force=765.0917 optimal_fiber_length=0.08361509
        tendon_slack_length=0.07510426 pennation_angle_at_optimal=0.3165559
      PathPoint P1: pelvis (-0.1057937 0.05509171 -0.09818337)
      PathPoint P2: femur_l (-0.021076 -0.00958 -0.053648)
      FiberForceLengthCurve: strain_at_zero_force=-0.1329608 strain_at_one_norm_force=0.6904088
          stiffness_at_low_force=0.2 stiffness_at_one_norm_force=2.429043 curviness=0.75
    Millard2012EquilibriumMuscle glmed3_l: max_isometric_force=871.1993 optimal_fiber_length=0.07946295
        tendon_slack_length=0.04924464 pennation_angle_at_optimal=0.3165559
      PathPoint P1: pelvis (-0.1244632 0.01602668 -0.07663092)
      PathPoint P2: femur_l (-0.0296022 -0.0045026 -0.0496244)
      FiberForceLengthCurve: strain_at_zero_force=-0.1914236 strain_at_one_norm_force=0.6558113
          stiffness_at_low_force=0.2 stiffness_at_one_norm_force=2.360621 curviness=0.75
    Millard2012EquilibriumMuscle glmin1_l: max_isometric_force=374.0459 optimal_fiber_length=0.0814046
        tendon_slack_length=0.01932483 pennation_angle_at_optimal=0.1745329
      PathPoint P1: pelvis (-0.03733896 0 -0.1412883)
      PathPoint P2: femur_l (0.00479 -0.01437 -0.053648)
      FiberForceLengthCurve: strain_at_zero_force=-8.172674e-8 strain_at_one_norm_force=0.7000001
          stiffness_at_low_force=0.2 stiffness_at_one_norm_force=2.857142 curviness=0.75
    Millard2012EquilibriumMuscle glmin2_l: max_isometric_force=394.8197 optimal_fiber_length=0.06748752
        tendon_slack_length=0.03145488 pennation_angle_at_optimal=0
      PathPoint P1: pelvis (-0.07666933 0.01001667 -0.1209332)
      PathPoint P2: femur_l (0.003832 -0.008622 -0.049816)
      FiberForceLengthCurve: strain_at_zero_force=0.001146607 strain_at_one_norm_force=0.6999804
          stiffness_at_low_force=0.2 stiffness_at_one_norm_force=2.861911 curviness=0.75
    Millard2012EquilibriumMuscle glmin3_l: max_isometric_force=446.7738 optimal_fiber_length=0.03530987
        tendon_slack_length=0.0472132 pennation_angle_at_optimal=0.01745329
      PathPoint P1: pelvis (-0.09820146 -0.01552585 -0.09554918)
      PathPoint P2: femur_l (-0.003832 -0.000958 -0.048858)
      FiberForceLengthCurve: strain_at_zero_force=-0.0351512 strain_at_one_norm_force=0.6990981
          stiffness_at_low_force=0.2 stiffness_at_one_norm_force=2.723871 curviness=0.75
    Millard2012EquilibriumMuscle grac_l: max_isometric_force=281.3115 optimal_fiber_length=0.2244551
        tendon_slack_length=0.169488 pennation_angle_at_optimal=0.1720016
      PathPoint P1: pelvis (-0.05894577 -0.1295356 -0.02940712)
      PathPoint P2: tibia_l (-0.02116458 -0.05463495 0.03402189)
      PathPoint P3: tibia_l (0.00204522 -0.07999338 0.01807377)
      PathWrap: wrap_object=GR_at_condyles_l method=hybrid
      FiberForceLengthCurve: strain_at_zero_force=-0.1885953 strain_at_one_norm_force=0.7244614
          stiffness_at_low_force=0.2 stiffness_at_one_norm_force=2.190445 curviness=0.75
    Millard2012EquilibriumMuscle iliacus_l: max_isometric_force=1021.141 optimal_fiber_length=0.1112431
        tendon_slack_length=0.1003074 pennation_angle_at_optimal=0.279914
      PathPoint P1: pelvis (-0.07530023 0.03095152 -0.1009373)
      PathPoint P2: pelvis (-0.01680253 -0.05579288 -0.09052028)
      PathPoint P3: femur_l (-0.0022034 -0.054127 -0.0133162)
      PathPoint P4: femur_l (-0.0116876 -0.0610246 -0.0187768)
      PathWrap: wrap_object=IL_at_brim_l method=hybrid range=(2 3)
      FiberForceLengthCurve: strain_at_zero_force=-0.1607227 strain_at_one_norm_force=0.5020882
          stiffness_at_low_force=0.2 stiffness_at_one_norm_force=3.017452 curviness=0.75
    Millard2012EquilibriumMuscle perbrev_l: max_isometric_force=521.2016 optimal_fiber_length=0.05489738
        tendon_slack_length=0.1783893 pennation_angle_at_optimal=0.2052361
      PathPoint P1: tibia_l (-0.0279207 -0.2909268 -0.0288399)
      PathPoint P2: tibia_l (-0.0389511 -0.4473057 -0.0286101)
      PathPoint P3: tibia_l (-0.0327465 -0.4600596 -0.0292995)
      PathPoint P4: calcn_l (0.05384262 0.04484054 -0.0348924)
      PathPoint P5: calcn_l (0.07739163 0.03637066 -0.05136521)
      FiberForceLengthCurve: strain_at_zero_force=-0.02868018 strain_at_one_norm_force=0.6992207
          stiffness_at_low_force=0.2 stiffness_at_one_norm_force=2.747627 curviness=0.75
    Millard2012EquilibriumMuscle perlong_l: max_isometric_force=1115.371 optimal_fiber_length=0.06195446
        tendon_slack_length=0.4051685 pennation_angle_at_optimal=0.2479525
      PathPoint P1: tibia_l (-0.02298 -0.1577577 -0.0324018)
      PathPoint P2: tibia_l (-0.0364233 -0.44811 -0.0272313)
      PathPoint P3: tibia_l (-0.0312528 -0.4612086 -0.027576)
      PathPoint P4: calcn_l (0.05007021 0.0381975 -0.03309537)
      PathPoint P5: calcn_l (0.07784889 0.01760407 -0.04252979)
      PathPoint P6: calcn_l (0.09739685 0.01145925 -0.01767083)
      PathPoint P7: calcn_l (0.1375216 0.01411647 0.02755451)
      FiberForceLengthCurve: strain_at_zero_force=-0.08769079 strain_at_one_norm_force=0.6966414
          stiffness_at_low_force=0.2 stiffness_at_one_norm_force=2.54994 curviness=0.75
    Millard2012EquilibriumMuscle piri_l: max_isometric_force=1029.787 optimal_fiber_length=0.02870658
        tendon_slack_length=0.1268679 pennation_angle_at_optimal=0.1745329
      PathPoint P1: pelvis (-0.126716 -0.006540888 -0.01617631)
      PathPoint P2: pelvis (-0.1269774 -0.03071112 -0.07294306)
      PathPoint P3: femur_l (-0.0141784 -0.0034488 -0.0418646)
      FiberForceLengthCurve: strain_at_zero_force=-0.1828826 strain_at_one_norm_force=0.7031405
          stiffness_at_low_force=0.2 stiffness_at_one_norm_force=2.257277 curviness=0.75
    Millard2012EquilibriumMuscle psoas_l: max_isometric_force=1426.79 optimal_fiber_length=0.1209551
        tendon_slack_length=0.1029962 pennation_angle_at_optimal=0.2155251
      PathPoint P1: pelvis (-0.0754247 0.06210338 -0.04669697)
      PathPoint P2: pelvis (-0.02551495 -0.06550905 -0.0785467)
      PathPoint P3: femur_l (-0.0126456 -0.0447386 -0.0044068)
      PathPoint P4: femur_l (-0.022513 -0.0501992 -0.0084304)
      PathWrap: wrap_object=PS_at_brim_l method=hybrid range=(2 3)
      FiberForceLengthCurve: strain_at_zero_force=-0.07629291 strain_at_one_norm_force=0.5032605
          stiffness_at_low_force=0.2 stiffness_at_one_norm_force=3.450933 curviness=0.75
    Millard2012EquilibriumMuscle recfem_l: max_isometric_force=2191.741 optimal_fiber_length=0.07451281
        tendon_slack_length=0.4421703 pennation_angle_at_optimal=0.2170149
      PathPoint P1: pelvis (-0.02987117 -0.0388647 -0.1117135)
      PathPoint P2: patella_l (0.00958 0.046942 -0.0006706)
      PathPoint P3: patella_l (0.0115918 0.0418646 0.000958)
      PathPoint P4: patella_l (0.00479 0.00236626 -2.874e-5)
      PathPoint P5: tibia_l (0.0374574 -0.07252488 0.00054003)
      PathWrap: wrap_object=KnExt_at_fem_l method=hybrid
      FiberForceLengthCurve: strain_at_zero_force=0.1997943 strain_at_one_norm_force=0.8997465
          stiffness_at_low_force=0.2 stiffness_at_one_norm_force=2.857338 curviness=0.75
    Millard2012EquilibriumMuscle sart_l: max_isometric_force=249.4131 optimal_fiber_length=0.4039559
        tendon_slack_length=0.124294 pennation_angle_at_optimal=0.02613542
      PathPoint P1: pelvis (-0.02427032 -0.01562601 -0.126441)
      PathPoint P2: femur_l (-0.002874 -0.3418144 0.0403318)
      PathPoint P3: tibia_l (-0.0288399 -0.0460749 0.0419385)
      PathPoint P4: tibia_l (-0.0182691 -0.0688251 0.0303336)
      PathPoint P5: tibia_l (0.0156264 -0.093069 0.0029874)
      FiberForceLengthCurve: strain_at_zero_force=-0.07294162 strain_at_one_norm_force=0.7021361
          stiffness_at_low_force=0.2 stiffness_at_one_norm_force=2.580386 curviness=0.75
    Millard2012EquilibriumMuscle semimem_l: max_isometric_force=2200.987 optimal_fiber_length=0.08375938
        tendon_slack_length=0.326272 pennation_angle_at_optimal=0.2545615
      PathPoint P1: pelvis (-0.1228452 -0.1141901 -0.07351779)
      PathPoint P2: tibia_l (-0.031023 -0.047109 0.0225204)
      PathWrap: wrap_object=SM_at_condyles_l method=hybrid
      FiberForceLengthCurve: strain_at_zero_force=0.1537347 strain_at_one_norm_force=0.7044745
          stiffness_at_low_force=0.2 stiffness_at_one_norm_force=3.631479 curviness=0.75
    Millard2012EquilibriumMuscle semiten_l: max_isometric_force=591.2951 optimal_fiber_length=0.1912875
        tendon_slack_length=0.2450056 pennation_angle_at_optimal=0.241295
      PathPoint P1: pelvis (-0.1291928 -0.1255089 -0.06166395)
      PathPoint P2: tibia_l (-0.0358488 -0.0583692 0.0263121)
      PathPoint P3: tibia_l (0.0021831 -0.0888177 0.0134433)
      PathWrap: wrap_object=ST_at_condyles_l method=hybrid
      FiberForceLengthCurve: strain_at_zero_force=0.114169 strain_at_one_norm_force=0.7136122
          stiffness_at_low_force=0.2 stiffness_at_one_norm_force=3.336429 curviness=0.75
    Millard2012EquilibriumMuscle soleus_l: max_isometric_force=6194.843 optimal_fiber_length=0.05130401
        tendon_slack_length=0.3280542 pennation_angle_at_optimal=0.3814289
      PathPoint P1: tibia_l (-0.0087324 -0.1052484 -0.0112602)
      PathPoint P2: calcn_l (0.005029884 0.05148359 0.007936898)
      FiberForceLengthCurve: strain_at_zero_force=0.04016445 strain_at_one_norm_force=0.7659521
          stiffness_at_low_force=0.2 stiffness_at_one_norm_force=2.755627 curviness=0.75
    Millard2012EquilibriumMuscle tfl_l: max_isometric_force=411.2066 optimal_fiber_length=0.09149587
        tendon_slack_length=0.4329233 pennation_angle_at_optimal=0.05235988
      PathPoint P1: pelvis (-0.02489264 0.01101834 -0.1544592)
      PathPoint P2: femur_l (0.0281652 -0.095321 -0.0571926)
      PathPoint P3: femur_l (0.0102506 -0.38799 -0.0310392)
      PathPoint P4: tibia_l (0.0124092 -0.047109 -0.0397554)
      FiberForceLengthCurve: strain_at_zero_force=0.1571908 strain_at_one_norm_force=0.6394004
          stiffness_at_low_force=0.2 stiffness_at_one_norm_force=4.147574 curviness=0.75
    Millard2012EquilibriumMuscle tibant_l: max_isometric_force=1227.452 optimal_fiber_length=0.08112939
        tendon_slack_length=0.2856289 pennation_angle_at_optimal=0.1951828
      PathPoint P1: tibia_l (0.0176946 -0.1507488 -0.0186138)
      PathPoint P2: tibia_l (0.0288399 -0.2189994 -0.0147072)
      PathPoint P3: tibia_l (0.0267717 -0.4204191 0.0151668)
      PathPoint P4: calcn_l (0.1332919 0.02956154 0.0456746)
      FiberForceLengthCurve: strain_at_zero_force=0.1588072 strain_at_one_norm_force=0.7083715
          stiffness_at_low_force=0.2 stiffness_at_one_norm_force=3.639246 curviness=0.75
    Millard2012EquilibriumMuscle tibpost_l: max_isometric_force=1730.154 optimal_fiber_length=0.04458645
        tendon_slack_length=0.3311896 pennation_angle_at_optimal=0.2264891
      PathPoint P1: tibia_l (-0.0047109 -0.1498296 -0.0118347)
      PathPoint P2: tibia_l (-0.0188436 -0.4199595 0.0201075)
      PathPoint P3: calcn_l (0.04766958 0.05546941 0.0428293)
      PathPoint P4: calcn_l (0.0882516 0.0264061 0.04208053)
      FiberForceLengthCurve: strain_at_zero_force=-0.07310113 strain_at_one_norm_force=0.698029
          stiffness_at_low_force=0.2 stiffness_at_one_norm_force=2.593596 curviness=0.75
    Millard2012EquilibriumMuscle vasint_l: max_isometric_force=1697.361 optimal_fiber_length=0.1165027
        tendon_slack_length=0.2041287 pennation_angle_at_optimal=0.06309973
      PathPoint P1: femur_l (0.027782 -0.1843192 -0.029698)
      PathPoint P2: femur_l (0.032093 -0.1996472 -0.027303)
      PathPoint P3: patella_l (0.0055564 0.045984 0.0005748)
      PathPoint P4: patella_l (0.00479 0.00236626 0.00037362)
      PathPoint P5: tibia_l (0.03742293 -0.0726168 -0.00049407)
      PathWrap: wrap_object=KnExt_at_fem_l method=hybrid
      FiberForceLengthCurve: strain_at_zero_force=0.1756531 strain_at_one_norm_force=0.7074754
          stiffness_at_low_force=0.2 stiffness_at_one_norm_force=3.760655 curviness=0.75
    Millard2012EquilibriumMuscle vaslat_l: max_isometric_force=5148.767 optimal_fiber_length=0.1162985
        tendon_slack_length=0.2196749 pennation_angle_at_optimal=0.2528673
      PathPoint P1: femur_l (0.0045984 -0.1776132 -0.0334342)
      PathPoint P2: femur_l (0.0257702 -0.2482178 -0.0391822)
      PathPoint P3: patella_l (0.0098674 0.0405234 -0.0135078)
      PathPoint P4: patella_l (0.00479 0.00236626 -0.00702214)
      PathPoint P5: tibia_l (0.03738846 -0.07282362 -0.00587139)
      PathWrap: wrap_object=KnExtVL_at_fem_l method=hybrid
      FiberForceLengthCurve: strain_at_zero_force=0.1934746 strain_at_one_norm_force=0.711135
          stiffness_at_low_force=0.2 stiffness_at_one_norm_force=3.863536 curviness=0.75
    Millard2012EquilibriumMuscle vasmed_l: max_isometric_force=2747.823 optimal_fiber_length=0.1097075
        tendon_slack_length=0.2074469 pennation_angle_at_optimal=0.4222225
      PathPoint P1: femur_l (0.013412 -0.2010842 -0.0180104)
      PathPoint P2: femur_l (0.0341048 -0.2652702 -0.0008622)
      PathPoint P3: patella_l (0.0060354 0.042631 0.016286)
      PathPoint P4: patella_l (0.00479 0.00236626 0.008143)
      PathPoint P5: tibia_l (0.0366531 -0.07304193 0.00779022)
      PathWrap: wrap_object=KnExt_at_fem_l method=hybrid
      FiberForceLengthCurve: strain_at_zero_force=0.1780858 strain_at_one_norm_force=0.706013
          stiffness_at_low_force=0.2 stiffness_at_one_norm_force=3.788401 curviness=0.75
    CoordinateActuator lumbar_ext: coordinate=lumbar_extension optimal_force=10
    CoordinateActuator lumbar_bend: coordinate=lumbar_bending optimal_force=10
    CoordinateActuator lumbar_rot: coordinate=lumbar_rotation optimal_force=10
    CoordinateActuator shoulder_flex_r: coordinate=arm_flex_r optimal_force=10
    CoordinateActuator shoulder_add_r: coordinate=arm_add_r optimal_force=10
    CoordinateActuator shoulder_rot_r: coordinate=arm_rot_r optimal_force=10
    CoordinateActuator elbow_flex_r: coordinate=elbow_flex_r optimal_force=10
    CoordinateActuator pro_sup_r: coordinate=pro_sup_r optimal_force=10
    CoordinateActuator wrist_flex_r: coordinate=wrist_flex_r optimal_force=10
    CoordinateActuator wrist_dev_r: coordinate=wrist_dev_r optimal_force=10
    CoordinateActuator shoulder_flex_l: coordinate=arm_flex_l optimal_force=10
    CoordinateActuator shoulder_add_l: coordinate=arm_add_l optimal_force=10
    CoordinateActuator shoulder_rot_l: coordinate=arm_rot_l optimal_force=10
    CoordinateActuator elbow_flex_l: coordinate=elbow_flex_l optimal_force=10
    CoordinateActuator pro_sup_l: coordinate=pro_sup_l optimal_force=10
    CoordinateActuator wrist_flex_l: coordinate=wrist_flex_l optimal_force=10
    CoordinateActuator wrist_dev_l: coordinate=wrist_dev_l optimal_force=10
    ObjectGroup right_leg: members=(addbrev_r addlong_r addmagDist_r addmagIsch_r addmagMid_r addmagProx_r bflh_r bfsh_r edl_r ehl_r fdl_r fhl_r gaslat_r gasmed_r glmax1_r glmax2_r glmax3_r glmed1_r glmed2_r glmed3_r glmin1_r glmin2_r glmin3_r grac_r iliacus_r perbrev_r perlong_r piri_r psoas_r recfem_r sart_r semimem_r semiten_r soleus_r tfl_r tibant_r tibpost_r vasint_r vaslat_r vasmed_r)
    ObjectGroup left_leg: members=(addbrev_l addlong_l addmagDist_l addmagIsch_l addmagMid_l addmagProx_l bflh_l bfsh_l edl_l ehl_l fdl_l fhl_l gaslat_l gasmed_l glmax1_l glmax2_l glmax3_l glmed1_l glmed2_l glmed3_l glmin1_l glmin2_l glmin3_l grac_l iliacus_l perbrev_l perlong_l piri_l psoas_l recfem_l sart_l semimem_l semiten_l soleus_l tfl_l tibant_l tibpost_l vasint_l vaslat_l vasmed_l)
    ObjectGroup hip_add_r: members=(addbrev_r addlong_r addmagDist_r addmagIsch_r addmagMid_r addmagProx_r bflh_r grac_r semimem_r semiten_r)
    ObjectGroup hip_abd_r: members=(glmax1_r glmed1_r glmed2_r glmed3_r glmin1_r glmin2_r glmin3_r piri_r sart_r tfl_r)
    ObjectGroup hip_flex_r: members=(addbrev_r addlong_r glmin1_r grac_r iliacus_r psoas_r recfem_r sart_r tfl_r)
    ObjectGroup hip_ext_r: members=(addlong_r addmagDist_r addmagIsch_r addmagMid_r addmagProx_r bflh_r glmax1_r glmax2_r glmax3_r glmed1_r glmed2_r glmed3_r glmin3_r semimem_r semiten_r)
    ObjectGroup hip_inrot_r: members=(glmed1_r glmed2_r glmed3_r glmin1_r iliacus_r psoas_r tfl_r)
    ObjectGroup hip_exrot_r: members=(glmin3_r piri_r)
    ObjectGroup knee_flex_r: members=(bflh_r bfsh_r gaslat_r gasmed_r grac_r sart_r semimem_r semiten_r)
    ObjectGroup knee_ext_r: members=(recfem_r vasint_r vaslat_r vasmed_r)
    ObjectGroup ankle_df_r: members=(edl_r ehl_r tibant_r)
    ObjectGroup ankle_pf_r: members=(fdl_r fhl_r gaslat_r gasmed_r perbrev_r perlong_r soleus_r tibpost_r)
    ObjectGroup everter_r: members=(edl_r perbrev_r perlong_r)
    ObjectGroup inverter_r: members=(ehl_r fdl_r fhl_r tibant_r tibpost_r)
    ObjectGroup hip_add_l: members=(addbrev_l addlong_l addmagDist_l addmagIsch_l addmagMid_l addmagProx_l bflh_l grac_l semimem_l semiten_l)
    ObjectGroup hip_abd_l: members=(glmax1_l glmed1_l glmed2_l glmed3_l glmin1_l glmin2_l glmin3_l piri_l sart_l tfl_l)
    ObjectGroup hip_flex_l: members=(addbrev_l addlong_l glmin1_l grac_l iliacus_l psoas_l recfem_l sart_l tfl_l)
    ObjectGroup hip_ext_l: members=(addlong_l addmagDist_l addmagIsch_l addmagMid_l addmagProx_l bflh_l glmax1_l glmax2_l glmax3_l glmed1_l glmed2_l glmed3_l glmin3_l semimem_l semiten_l)
    ObjectGroup hip_exrot_l: members=(glmin3_l piri_l)
    ObjectGroup hip_inrot_l: members=(glmed1_l glmed2_l glmed3_l glmin1_l iliacus_l psoas_l tfl_l)
    ObjectGroup knee_flex_l: members=(bflh_l bfsh_l gaslat_l gasmed_l grac_l sart_l semimem_l semiten_l)
    ObjectGroup knee_ext_l: members=(recfem_l vasint_l vaslat_l vasmed_l)
    ObjectGroup ankle_df_l: members=(edl_l ehl_l tibant_l)
    ObjectGroup ankle_pf_l: members=(fdl_l fhl_l gaslat_l gasmed_l perbrev_l perlong_l soleus_l tibpost_l)
    ObjectGroup everter_l: members=(edl_l perbrev_l perlong_l)
    ObjectGroup inverter_l: members=(ehl_l fdl_l fhl_l tibant_l tibpost_l)
  MarkerSet:
    Marker R.Shoulder: torso (0 0.4923246 0.1718385) fixed=true
    Marker L.Shoulder: torso (0 0.4923246 -0.1718385) fixed=true
    Marker R.Clavicle: torso (0.05566598 0.4534569 0.03025325) fixed=true
    Marker L.Clavicle: torso (0.05566598 0.4534569 -0.03025325) fixed=true
    Marker R.Biceps: humerus_r (0.004279479 -0.1502277 0.01410758)
    Marker R.Elbow: humerus_r (0.0109817 -0.3085858 0.03843595) fixed=true
    Marker R.MElbow: humerus_r (0 -0.3085858 -0.04612314) fixed=true
    Marker R.Forearm: ulna_r (0.03185134 -0.1472871 0.04507252)
    Marker R.Wrist: radius_r (-0.0304191 -0.2433528 0.00608382) fixed=true
    Marker L.Biceps: humerus_l (0.001332863 -0.123552 -0.04189353)
    Marker L.Elbow: humerus_l (0.0109817 -0.3085858 -0.03843595) fixed=true
    Marker L.MElbow: humerus_l (0 -0.3085858 0.04612314) fixed=true
    Marker L.Forearm: ulna_l (0.01912288 -0.146833 -0.04953754)
    Marker L.Wrist: radius_l (-0.0304191 -0.2433528 -0.00608382) fixed=true
    Marker R.ASIS: pelvis (0.01618022 0.03005002 0.1532618) fixed=true
    Marker L.ASIS: pelvis (0.01618022 0.03005002 -0.1532618) fixed=true
    Marker S2: pelvis (-0.2240337 0.02504169 0) fixed=true
    Marker R.PSIS: pelvis (-0.1892535 0.02947867 0.03599086)
    Marker L.PSIS: pelvis (-0.186347 0.02866176 -0.05416104)
    Marker R_HJC: femur_r (0 0 0) fixed=true
    Marker L_HJC: femur_l (0 0 0) fixed=true
    Marker R.TH1: femur_r (0.06173836 -0.1296623 0.09901572)
    Marker R.TH2: femur_r (-0.04650714 -0.139196 0.1103224)
    Marker R.TH3: femur_r (-0.04673685 -0.2668486 0.08496906)
    Marker R.Knee: femur_r (0 -0.387032 0.045026) fixed=true
    Marker R.MKnee: femur_r (0.00479 -0.384158 -0.0479) fixed=true
    Marker R.SH1: tibia_r (0.005833387 -0.1029927 0.07212965)
    Marker R.SH2: tibia_r (0.009564867 -0.2150899 0.07968529)
    Marker R.SH3: tibia_r (-0.07787985 -0.1100733 0.07516603)
    Marker R.SH4: tibia_r (-0.07415466 -0.2302616 0.07519721)
    Marker R.Ankle: tibia_r (-0.01205711 -0.4284872 0.05196097)
    Marker R.MAnkle: tibia_r (0.006894 -0.4352412 -0.043662) fixed=true
    Marker R.Toe: calcn_r (0.2834466 0.05372574 -0.02126086)
    Marker R.MT5: calcn_r (0.174498 0.02722436 0.07521307)
    Marker R.Heel: calcn_r (-0.01531614 0.02517762 -0.008129381)
    Marker L.TH1: femur_l (0.07287198 -0.1062439 -0.1156731)
    Marker L.TH2: femur_l (0.08046881 -0.231408 -0.07797195)
    Marker L.TH3: femur_l (-0.03370332 -0.1026034 -0.1244819)
    Marker L.TH4: femur_l (-0.03782062 -0.233167 -0.08597951)
    Marker L.Knee: femur_l (0 -0.387032 -0.045026) fixed=true
    Marker L.MKnee: femur_l (0.00479 -0.384158 0.0479) fixed=true
    Marker L.SH1: tibia_l (0.02398471 -0.1073266 -0.04668648)
    Marker L.SH2: tibia_l (-0.0692759 -0.09908492 -0.07400737)
    Marker L.SH3: tibia_l (-0.07308011 -0.2159907 -0.07136378)
    Marker L.Ankle: tibia_l (-0.002386819 -0.4231269 -0.05392523)
    Marker L.MAnkle: tibia_l (0.006894 -0.4352412 0.043662) fixed=true
    Marker L.Toe: calcn_l (0.27771 0.05992072 0.01500576)
    Marker L.Heel: calcn_l (-0.01659395 0.02528833 0.008024683)
    Marker L.MT5: calcn_l (0.1739197 0.02540629 -0.07688904)
    Marker MidPSIS: pelvis (-0.1916733 0.03806336 0) fixed=true
    Marker MidASIS: pelvis (0.01618022 0.03005002 0) fixed=true
    Marker MidClavicle: torso (0.05566598 0.4534569 0) fixed=true
    Marker L.AnkleJoint: tibia_l (0.0005745 -0.4352412 -0.0086175) fixed=true
    Marker L.KneeJoint: femur_l (0.002395 -0.385595 0.001437) fixed=true
    Marker L.HeelGround: calcn_l (-0.02286311 -0.008303804 0.01497528) fixed=true
    Marker L.MT5Ground: calcn_l (0.1829049 -0.008303804 -0.0748764) fixed=true
    Marker L.ToeGround: calcn_l (0.2629258 -0.008303804 0.02396045) fixed=true
    Marker L.AnkleJointGround: tibia_l (0.0005745 -0.5135456 -0.0086175) fixed=true
    Marker R.AnkleJoint: tibia_r (0.0005745 -0.4352412 0.0086175) fixed=true
    Marker R.KneeJoint: femur_r (0.002395 -0.385595 -0.001437) fixed=true
    Marker R.HeelGround: calcn_r (-0.02286311 -0.008303804 -0.01497528) fixed=true
    Marker R.MT5Ground: calcn_r (0.1829049 -0.008303804 0.0748764) fixed=true
    Marker R.ToeGround: calcn_r (0.2629258 -0.008303804 -0.02396045) fixed=true
    Marker R.AnkleJointGround: tibia_r (0.0005745 -0.5135456 0.0086175) fixed=true
