# OpenSim document version 40500
MarkerSet:
  Marker R.Shoulder: torso (0 0.4923246 0.1718385) fixed=true
  Marker L.Shoulder: torso (0 0.4923246 -0.1718385) fixed=true
  Marker R.Clavicle: torso (0.05566598 0.4534569 0.03025325) fixed=true
  Marker L.Clavicle: torso (0.05566598 0.4534569 -0.03025325) fixed=true
  Marker R.Biceps: humerus_r (0.004279479 -0.1502277 0.01410758)
  Marker R.Elbow: humerus_r (0.0109817 -0.3085858 0.03843595) fixed=true
  Marker R.MElbow: humerus_r (0 -0.3085858 -0.04612314) fixed=true
  Marker R.Forearm: ulna_r (0.03185134 -0.1472871 0.04507252)
  Marker R.Wrist: radius_r (-0.0304191 -0.2433528 0.00608382) fixed=true
  Marker L.Biceps: humerus_l (0.001332863 -0.123552 -0.04189353)
  Marker L.Elbow: humerus_l (0.0109817 -0.3085858 -0.03843595) fixed=true
  Marker L.MElbow: humerus_l (0 -0.3085858 0.04612314) fixed=true
  Marker L.Forearm: ulna_l (0.01912288 -0.146833 -0.04953754)
  Marker L.Wrist: radius_l (-0.0304191 -0.2433528 -0.00608382) fixed=true
  Marker R.ASIS: pelvis (0.01618022 0.03005002 0.1532618) fixed=true
  Marker L.ASIS: pelvis (0.01618022 0.03005002 -0.1532618) fixed=true
  Marker S2: pelvis (-0.2240337 0.02504169 0) fixed=true
  Marker R.PSIS: pelvis (-0.1892535 0.02947867 0.03599086)
  Marker L.PSIS: pelvis (-0.186347 0.02866176 -0.05416104)
  Marker R_HJC: femur_r (0 0 0) fixed=true
  Marker L_HJC: femur_l (0 0 0) fixed=true
  Marker R.TH1: femur_r (0.06173836 -0.1296623 0.09901572)
  Marker R.TH2: femur_r (-0.04650714 -0.139196 0.1103224)
  Marker R.TH3: femur_r (-0.04673685 -0.2668486 0.08496906)
  Marker R.Knee: femur_r (0 -0.387032 0.045026) fixed=true
  Marker R.MKnee: femur_r (0.00479 -0.384158 -0.0479) fixed=true
  Marker R.SH1: tibia_r (0.005833387 -0.1029927 0.07212965)
  Marker R.SH2: tibia_r (0.009564867 -0.2150899 0.07968529)
  Marker R.SH3: tibia_r (-0.07787985 -0.1100733 0.07516603)
  Marker R.SH4: tibia_r (-0.07415466 -0.2302616 0.07519721)
  Marker R.Ankle: tibia_r (-0.01205711 -0.4284872 0.05196097)
  Marker R.MAnkle: tibia_r (0.006894 -0.4352412 -0.043662) fixed=true
  Marker R.Toe: calcn_r (0.2834466 0.05372574 -0.02126086)
  Marker R.MT5: calcn_r (0.174498 0.02722436 0.07521307)
  Marker R.Heel: calcn_r (-0.01531614 0.02517762 -0.008129381)
  Marker L.TH1: femur_l (0.07287198 -0.1062439 -0.1156731)
  Marker L.TH2: femur_l (0.08046881 -0.231408 -0.07797195)
  Marker L.TH3: femur_l (-0.03370332 -0.1026034 -0.1244819)
  Marker L.TH4: femur_l (-0.03782062 -0.233167 -0.08597951)
  Marker L.Knee: femur_l (0 -0.387032 -0.045026) fixed=true
  Marker L.MKnee: femur_l (0.00479 -0.384158 0.0479) fixed=true
  Marker L.SH1: tibia_l (0.02398471 -0.1073266 -0.04668648)
  Marker L.SH2: tibia_l (-0.0692759 -0.09908492 -0.07400737)
  Marker L.SH3: tibia_l (-0.07308011 -0.2159907 -0.07136378)
  Marker L.Ankle: tibia_l (-0.002386819 -0.4231269 -0.05392523)
  Marker L.MAnkle: tibia_l (0.006894 -0.4352412 0.043662) fixed=true
  Marker L.Toe: calcn_l (0.27771 0.05992072 0.01500576)
  Marker L.Heel: calcn_l (-0.01659395 0.02528833 0.008024683)
  Marker L.MT5: calcn_l (0.1739197 0.02540629 -0.07688904)
  Marker MidPSIS: pelvis (-0.1916733 0.03806336 0) fixed=true
  Marker MidASIS: pelvis (0.01618022 0.03005002 0) fixed=true
  Marker MidClavicle: torso (0.05566598 0.4534569 0) fixed=true
  Marker L.AnkleJoint: tibia_l (0.0005745 -0.4352412 -0.0086175) fixed=true
  Marker L.KneeJoint: femur_l (0.002395 -0.385595 0.001437) fixed=true
  Marker L.HeelGround: calcn_l (-0.02286311 -0.008303804 0.01497528) fixed=true
  Marker L.MT5Ground: calcn_l (0.1829049 -0.008303804 -0.0748764) fixed=true
  Marker L.ToeGround: calcn_l (0.2629258 -0.008303804 0.02396045) fixed=true
  Marker L.AnkleJointGround: tibia_l (0.0005745 -0.5135456 -0.0086175) fixed=true
  Marker R.AnkleJoint: tibia_r (0.0005745 -0.4352412 0.0086175) fixed=true
  Marker R.KneeJoint: femur_r (0.002395 -0.385595 -0.001437) fixed=true
  Marker R.HeelGround: calcn_r (-0.02286311 -0.008303804 -0.01497528) fixed=true
  Marker R.MT5Ground: calcn_r (0.1829049 -0.008303804 0.0748764) fixed=true
  Marker R.ToeGround: calcn_r (0.2629258 -0.008303804 -0.02396045) fixed=true
  Marker R.AnkleJointGround: tibia_r (0.0005745 -0.5135456 0.0086175) fixed=true
